<?xml version="1.0"?>
<fdm_config>
  <subsystem name="aerodynamics">
    <input name="actuators">
      <property select="dal">dal_rad</property>
      <property select="dar">dar_rad</property>
      <property select="de">de_rad</property>
      <property select="dr">dr_rad</property>
    </input>
    <input name="aero">
      <property select="Alpha">alpha_rad</property>
      <property select="Beta">beta_rad</property>
      <property select="pqr">pqr_a</property>
      <property select="TAS">TAS</property>
    </input>
    <constant>
      <property value="0.8715">RefArea</property>
      <property value="1.5288">RefSpan</property>
      <property value="0.635">RefLen</property>
      <property value="[0 0 0]">RefPosCG</property>
      <property value="1">coeff_type</property>
    </constant>
    <parameter>
      <property value="0.0">CD0UncertVal</property>
      <property value="1.0">CDdeUncertGain</property>
      <property value="0.0">CL0UncertVal</property>
      <property value="1.0">CLdeUncertGain</property>
      <property value="1.0">CLqUncertGain</property>
      <property value="0.0">CY0UncertVal</property>
      <property value="1.0">CYdrUncertGain</property>
      <property value="0.0">Cl0UncertVal</property>
      <property value="1.0">CldarUncertGain</property>
      <property value="1.0">CldalUncertGain</property>
      <property value="1.0">CldrUncertGain</property>
      <property value="1.0">ClpUncertGain</property>
      <property value="1.0">ClrUncertGain</property>
      <property value="0.0">Cm0UncertVal</property>
      <property value="1.0">CmdeUncertGain</property>
      <property value="1.0">CmqUncertGain</property>
      <property value="0.0">Cn0UncertVal</property>
      <property value="1.0">CndrUncertGain</property>
      <property value="1.0">CndalUncertGain</property>
      <property value="1.0">CndarUncertGain</property>
      <property value="1.0">CnpUncertGain</property>
      <property value="1.0">CnrUncertGain</property>
      <property value="-0.500000">cmq</property>
      <property value="10.000000">cLq</property>
      <property value="-0.500000">clp</property>
      <property value="-0.040000">cnp</property>
      <property value="0.080000">clr</property>
      <property value="-0.020000">cnr</property>
    </parameter>
    <function name="alpha_deg">
      <product>
        <property>alpha_rad</property>
        <value>57.29</value>
      </product>
    </function>
    <function name="beta_deg">
      <saturation UpperLimit="15" LowerLimit="-15">
        <product>
           <property>beta_rad</property>
           <value>57.29</value>
        </product>
      </saturation>
    </function>
    <function name="TAS_g">
      <saturation UpperLimit="Inf" LowerLimit="0.01">
        <property>TAS</property>
      </saturation>
    </function>
    <function name="dr_deg">
      <product>
        <property>dr_rad</property>
        <value>57.3</value>
      </product>
    </function>
    <function name="dar_deg">
      <product>
        <property>dar_rad</property>
        <value>57.3</value>
      </product>
    </function>
    <function name="dal_deg">
      <product>
        <property>dal_rad</property>
        <value>57.3</value>
      </product>
    </function>
    <function name="de_deg">
      <product>
        <property>de_rad</property>
        <value>57.3</value>
      </product>
    </function>
    <function name="p_norm">
      <product Inputs="**//">
        <select InputPortWidth="3" IndexParamArray="{'1'}">
          <property>pqr_a</property>
        </select>
        <property>RefSpan</property>
        <property>TAS_g</property>
        <value>2</value>
      </product>
    </function>
    <function name="q_norm">
      <product Inputs="**//">
        <select InputPortWidth="3" IndexParamArray="{'2'}">
          <property>pqr_a</property>
        </select>
        <property>RefLen</property>
        <property>TAS_g</property>
        <value>2</value>
      </product>
    </function>
    <function name="r_norm">
      <product Inputs="**//">
        <select InputPortWidth="3" IndexParamArray="{'3'}">
          <property>pqr_a</property>
        </select>
        <property>RefSpan</property>
        <property>TAS_g</property>
        <value>2</value>
      </product>
    </function>
    <function name="CL">
      <add>
        <table name="CL_base">
          <breakpoints property="alpha_deg">-6.00 -4.00 -2.00 0.00 2.00 4.00 6.00 8.00 10.00 12.00 14.00 16.00 18.00 20.00 22.00 24.00 26.00 28.00 30.00 32.00 </breakpoints>
          <breakpoints property="beta_deg">-12.00 -8.00 -4.00 0.00 4.00 8.00 12.00 </breakpoints>
          <tableData>
-0.308445 -0.205120 -0.104925 -0.005698  0.092940  0.190273  0.283065  0.375789  0.474334  0.558500  0.632772  0.715026  0.783019  0.853612  0.928782  0.999502  1.064028  1.127188  1.177170  1.223228
-0.320376 -0.214542 -0.110813 -0.007845  0.092542  0.192544  0.287262  0.383965  0.485541  0.575414  0.652759  0.726578  0.795809  0.863843  0.939836  1.011223  1.082641  1.143153  1.196423  1.239953
-0.333060 -0.224157 -0.116660 -0.012323  0.089805  0.189238  0.281389  0.382523  0.481927  0.576398  0.652034  0.721112  0.791549  0.873629  0.949284  1.022755  1.089714  1.148809  1.201896  1.241787
-0.326292 -0.206885 -0.103387 -0.002476  0.103422  0.202103  0.293660  0.393371  0.494596  0.594787  0.663422  0.730061  0.802280  0.889260  0.957815  1.030896  1.098688  1.163694  1.213579  1.258262
-0.333060 -0.224157 -0.116660 -0.012323  0.089805  0.189238  0.281389  0.382523  0.481927  0.576398  0.652034  0.721112  0.791549  0.873629  0.949284  1.022755  1.089714  1.148809  1.201896  1.241787
-0.320376 -0.214542 -0.110813 -0.007845  0.092542  0.192544  0.287262  0.383965  0.485541  0.575414  0.652759  0.726578  0.795809  0.863843  0.939836  1.011223  1.082641  1.143153  1.196423  1.239953
-0.308445 -0.205120 -0.104925 -0.005698  0.092940  0.190273  0.283065  0.375789  0.474334  0.558500  0.632772  0.715026  0.783019  0.853612  0.928782  0.999502  1.064028  1.127188  1.177170  1.223228
          </tableData>
        </table>
        <product>
          <table name="CL_de">
            <breakpoints property="alpha_deg">-6.00 -4.00 -2.00 0.00 2.00 4.00 6.00 8.00 10.00 12.00 14.00 16.00 18.00 20.00 22.00 24.00 26.00 28.00 30.00 32.00 </breakpoints>
            <breakpoints property="beta_deg">-8.00 0.00 8.00 </breakpoints>
            <breakpoints property="de_deg">-30.00 -20.00 -10.00 0.00 10.00 20.00 30.00 </breakpoints>
            <tableData>
-0.206247 -0.209958 -0.205637 -0.210949 -0.210070 -0.212852 -0.209619 -0.209975 -0.217785 -0.253181 -0.260833 -0.270220 -0.283261 -0.284401 -0.294556 -0.296105 -0.303974 -0.312073 -0.311421 -0.314928
-0.177991 -0.193390 -0.189810 -0.187291 -0.192329 -0.192586 -0.195040 -0.207355 -0.216402 -0.242065 -0.270951 -0.285164 -0.284116 -0.284446 -0.291809 -0.299575 -0.303346 -0.316357 -0.316094 -0.323234
-0.206247 -0.209958 -0.205637 -0.210949 -0.210070 -0.212852 -0.209619 -0.209975 -0.217785 -0.253181 -0.260833 -0.270220 -0.283261 -0.284401 -0.294556 -0.296105 -0.303974 -0.312073 -0.311421 -0.314928
-0.170899 -0.164668 -0.167047 -0.168569 -0.168098 -0.165741 -0.161268 -0.162695 -0.170605 -0.186913 -0.195530 -0.202640 -0.206206 -0.204167 -0.212107 -0.216499 -0.226513 -0.227748 -0.227582 -0.233095
-0.168567 -0.173882 -0.171363 -0.168742 -0.173500 -0.170015 -0.159408 -0.162685 -0.169209 -0.183219 -0.202913 -0.211522 -0.208674 -0.214090 -0.211719 -0.218619 -0.225028 -0.227699 -0.229183 -0.235978
-0.170899 -0.164668 -0.167047 -0.168569 -0.168098 -0.165741 -0.161268 -0.162695 -0.170605 -0.186913 -0.195530 -0.202640 -0.206206 -0.204167 -0.212107 -0.216499 -0.226513 -0.227748 -0.227582 -0.233095
-0.088785 -0.086360 -0.082472 -0.078979 -0.077923 -0.075877 -0.075123 -0.071590 -0.075588 -0.082409 -0.087135 -0.090610 -0.097489 -0.086671 -0.098572 -0.096878 -0.103723 -0.102213 -0.101058 -0.095836
-0.055844 -0.062307 -0.061950 -0.057024 -0.061246 -0.059276 -0.053940 -0.057808 -0.061708 -0.068828 -0.076968 -0.082267 -0.092122 -0.096972 -0.091924 -0.100371 -0.096259 -0.100953 -0.100679 -0.101196
-0.088785 -0.086360 -0.082472 -0.078979 -0.077923 -0.075877 -0.075123 -0.071590 -0.075588 -0.082409 -0.087135 -0.090610 -0.097489 -0.086671 -0.098572 -0.096878 -0.103723 -0.102213 -0.101058 -0.095836
 0.000000  0.000000  0.000000  0.000000  0.000000  0.000000  0.000000  0.000000  0.000000  0.000000  0.000000  0.000000  0.000000  0.000000  0.000000  0.000000  0.000000  0.000000  0.000000  0.000000
 0.000000  0.000000  0.000000  0.000000  0.000000  0.000000  0.000000  0.000000  0.000000  0.000000  0.000000  0.000000  0.000000  0.000000  0.000000  0.000000  0.000000  0.000000  0.000000  0.000000
 0.000000  0.000000  0.000000  0.000000  0.000000  0.000000  0.000000  0.000000  0.000000  0.000000  0.000000  0.000000  0.000000  0.000000  0.000000  0.000000  0.000000  0.000000  0.000000  0.000000
 0.079218  0.079369  0.080173  0.079695  0.078527  0.078129  0.075858  0.083093  0.077947  0.085289  0.088297  0.087220  0.081903  0.083816  0.081521  0.082308  0.074240  0.073013  0.070181  0.060048
 0.093354  0.087655  0.081738  0.083850  0.080108  0.081899  0.088857  0.090814  0.095123  0.091416  0.094790  0.094015  0.095314  0.092156  0.093675  0.083679  0.073598  0.059833  0.060144  0.060826
 0.079218  0.079369  0.080173  0.079695  0.078527  0.078129  0.075858  0.083093  0.077947  0.085289  0.088297  0.087220  0.081903  0.083816  0.081521  0.082308  0.074240  0.073013  0.070181  0.060048
 0.157529  0.158678  0.159624  0.164344  0.164704  0.167505  0.168742  0.169222  0.171810  0.175661  0.174145  0.166299  0.158849  0.151804  0.151833  0.149177  0.134835  0.134509  0.124784  0.101754
 0.181053  0.171538  0.170620  0.177192  0.174268  0.175317  0.181272  0.184659  0.188237  0.186978  0.189883  0.192223  0.184618  0.174180  0.161526  0.144353  0.126710  0.116994  0.110400  0.104372
 0.157529  0.158678  0.159624  0.164344  0.164704  0.167505  0.168742  0.169222  0.171810  0.175661  0.174145  0.166299  0.158849  0.151804  0.151833  0.149177  0.134835  0.134509  0.124784  0.101754
 0.237065  0.229367  0.232684  0.235559  0.233396  0.231452  0.226741  0.228401  0.231064  0.228721  0.220807  0.199907  0.190285  0.194031  0.182511  0.171549  0.153722  0.151614  0.127203  0.091919
 0.257651  0.249279  0.249171  0.255247  0.245854  0.237158  0.240846  0.250632  0.251382  0.244596  0.242180  0.235259  0.226385  0.210780  0.186416  0.161461  0.134584  0.104444  0.089590  0.072482
 0.237065  0.229367  0.232684  0.235559  0.233396  0.231452  0.226741  0.228401  0.231064  0.228721  0.220807  0.199907  0.190285  0.194031  0.182511  0.171549  0.153722  0.151614  0.127203  0.091919
            </tableData>
          </table>
          <property>CLdeUncertGain</property>
        </product>
        <table name="CL_dal">
          <breakpoints property="alpha_deg">-6.00 -4.00 -2.00 0.00 2.00 4.00 6.00 8.00 10.00 12.00 14.00 16.00 18.00 20.00 22.00 24.00 26.00 28.00 30.00 32.00 </breakpoints>
          <breakpoints property="beta_deg">-8.00 -4.00 0.00 4.00 8.00 </breakpoints>
          <breakpoints property="dal_deg">-30.00 -20.00 -10.00 0.00 10.00 20.00 30.00 </breakpoints>
          <tableData>
 0.109487  0.113647  0.111111  0.107750  0.108491  0.103597  0.100303  0.096368  0.089854  0.074152  0.067896  0.059576  0.050108  0.050987  0.040072  0.038660  0.033183  0.031977  0.022818  0.018156
 0.124139  0.125373  0.123374  0.118782  0.115736  0.100609  0.114497  0.108463  0.098820  0.089430  0.067411  0.072070  0.058004  0.052149  0.042003  0.042896  0.034176  0.033442  0.027756  0.026561
 0.131446  0.124120  0.123278  0.119992  0.117577  0.106246  0.117749  0.119132  0.110962  0.093352  0.070909  0.067365  0.059406  0.052781  0.049269  0.045210  0.035730  0.023151  0.027048  0.019872
 0.148740  0.149705  0.147083  0.142272  0.139871  0.127127  0.137977  0.141095  0.137596  0.122699  0.103528  0.077454  0.085860  0.079038  0.063213  0.049662  0.044611  0.040055  0.039407  0.036068
 0.169326  0.160981  0.155602  0.151791  0.147548  0.144595  0.146510  0.158168  0.148399  0.133330  0.121599  0.105563  0.080041  0.078380  0.074474  0.070702  0.051113  0.043649  0.035227  0.038221
 0.075759  0.079731  0.080680  0.080785  0.081377  0.080311  0.076931  0.073768  0.067386  0.057441  0.051297  0.046134  0.034733  0.042672  0.035834  0.038110  0.028076  0.029453  0.023946  0.018400
 0.094351  0.093804  0.093809  0.090461  0.089841  0.087424  0.088959  0.080494  0.073239  0.071787  0.053618  0.059960  0.045862  0.046468  0.037207  0.040167  0.039190  0.033275  0.029241  0.028782
 0.102424  0.095996  0.095775  0.096692  0.093620  0.094189  0.095416  0.090084  0.081023  0.070661  0.055833  0.051090  0.054073  0.046139  0.045091  0.041880  0.036017  0.027710  0.029483  0.021425
 0.120768  0.121304  0.122006  0.119440  0.114848  0.111950  0.115991  0.114965  0.107501  0.092657  0.086334  0.060270  0.070304  0.070853  0.060469  0.050129  0.042117  0.039883  0.039683  0.043029
 0.142045  0.133156  0.130404  0.129167  0.125338  0.122932  0.124007  0.122631  0.117614  0.104359  0.094006  0.087960  0.068737  0.069530  0.063105  0.059198  0.053141  0.047326  0.035833  0.033050
 0.041759  0.040945  0.041290  0.039587  0.040353  0.038237  0.038285  0.040384  0.035424  0.031864  0.032614  0.026119  0.015454  0.025471  0.024903  0.016710  0.009147  0.012966  0.009527  0.010787
 0.052460  0.051217  0.048796  0.047599  0.045201  0.042879  0.044348  0.041700  0.038974  0.036637  0.032143  0.039154  0.029369  0.029230  0.023921  0.025918  0.022572  0.023735  0.018143  0.023010
 0.056735  0.047753  0.045829  0.047849  0.043947  0.042841  0.047608  0.044565  0.041610  0.031746  0.029185  0.028986  0.026023  0.023927  0.029266  0.024656  0.024655  0.018829  0.020708  0.017532
 0.069103  0.070797  0.065691  0.066843  0.065769  0.063863  0.062929  0.063429  0.060223  0.055368  0.047868  0.036392  0.046784  0.042329  0.037734  0.032057  0.030687  0.028789  0.028339  0.031206
 0.083663  0.080528  0.078984  0.072981  0.073044  0.072137  0.068094  0.072944  0.070233  0.061434  0.047015  0.049336  0.041967  0.039872  0.044701  0.043050  0.035463  0.028985  0.027681  0.028978
 0.000000  0.000000  0.000000  0.000000  0.000000  0.000000  0.000000  0.000000  0.000000  0.000000  0.000000  0.000000  0.000000  0.000000  0.000000  0.000000  0.000000  0.000000  0.000000  0.000000
 0.000000  0.000000  0.000000  0.000000  0.000000  0.000000  0.000000  0.000000  0.000000  0.000000  0.000000  0.000000  0.000000  0.000000  0.000000  0.000000  0.000000  0.000000  0.000000  0.000000
 0.000000  0.000000  0.000000  0.000000  0.000000  0.000000  0.000000  0.000000  0.000000  0.000000  0.000000  0.000000  0.000000  0.000000  0.000000  0.000000  0.000000  0.000000  0.000000  0.000000
 0.000000  0.000000  0.000000  0.000000  0.000000  0.000000  0.000000  0.000000  0.000000  0.000000  0.000000  0.000000  0.000000  0.000000  0.000000  0.000000  0.000000  0.000000  0.000000  0.000000
 0.000000  0.000000  0.000000  0.000000  0.000000  0.000000  0.000000  0.000000  0.000000  0.000000  0.000000  0.000000  0.000000  0.000000  0.000000  0.000000  0.000000  0.000000  0.000000  0.000000
-0.044431 -0.054396 -0.052744 -0.051457 -0.052495 -0.053221 -0.055113 -0.048155 -0.040947 -0.044769 -0.037945 -0.030952 -0.032946 -0.026803 -0.028680 -0.026261 -0.033498 -0.028039 -0.034490 -0.035058
-0.044342 -0.052479 -0.055441 -0.055877 -0.055787 -0.053997 -0.051175 -0.048670 -0.041036 -0.043930 -0.036673 -0.027962 -0.033605 -0.033909 -0.032396 -0.033492 -0.032974 -0.033053 -0.034728 -0.032178
-0.057581 -0.073227 -0.072101 -0.072173 -0.073865 -0.071252 -0.062619 -0.058298 -0.055532 -0.056148 -0.047790 -0.041741 -0.044891 -0.044422 -0.039007 -0.041407 -0.040981 -0.043436 -0.040997 -0.035595
-0.057257 -0.057918 -0.063129 -0.062574 -0.063968 -0.062581 -0.057918 -0.054636 -0.048450 -0.051421 -0.050517 -0.045701 -0.034233 -0.039097 -0.037492 -0.040545 -0.033235 -0.028808 -0.027121 -0.015886
-0.053647 -0.059167 -0.062332 -0.064338 -0.063626 -0.063516 -0.057259 -0.053602 -0.054363 -0.052935 -0.059029 -0.059941 -0.056140 -0.046257 -0.043011 -0.035540 -0.030448 -0.028493 -0.014257 -0.013849
-0.084751 -0.093943 -0.089559 -0.084786 -0.084127 -0.084695 -0.085341 -0.078718 -0.072536 -0.068431 -0.062344 -0.058823 -0.057411 -0.058692 -0.053426 -0.050304 -0.058426 -0.056434 -0.056138 -0.067103
-0.085727 -0.101097 -0.097739 -0.090880 -0.088605 -0.086876 -0.084605 -0.084241 -0.072999 -0.070869 -0.063151 -0.062318 -0.067695 -0.074913 -0.071291 -0.074436 -0.073221 -0.073000 -0.077184 -0.061594
-0.102747 -0.120043 -0.113546 -0.104109 -0.105575 -0.104420 -0.097409 -0.096753 -0.088146 -0.091949 -0.085276 -0.075081 -0.077670 -0.084211 -0.080301 -0.083338 -0.080196 -0.082409 -0.080490 -0.078842
-0.103469 -0.106762 -0.107923 -0.096127 -0.094117 -0.094542 -0.098123 -0.097713 -0.090048 -0.089054 -0.088048 -0.085034 -0.072675 -0.076028 -0.079398 -0.078339 -0.071033 -0.063705 -0.061806 -0.049584
-0.100892 -0.105244 -0.104591 -0.094160 -0.092188 -0.102523 -0.100893 -0.097685 -0.095561 -0.099346 -0.100964 -0.104506 -0.096751 -0.087370 -0.077025 -0.068704 -0.064454 -0.060383 -0.048819 -0.042255
-0.097454 -0.111251 -0.105841 -0.099051 -0.101037 -0.100455 -0.102947 -0.095065 -0.083109 -0.047389 -0.030638 -0.041884 -0.075770 -0.077902 -0.071936 -0.071871 -0.080370 -0.080606 -0.086359 -0.095288
-0.106847 -0.120192 -0.112184 -0.101325 -0.101925 -0.100926 -0.101774 -0.099119 -0.080766 -0.061064 -0.048938 -0.037347 -0.086833 -0.096613 -0.094468 -0.098213 -0.103440 -0.101029 -0.103168 -0.099339
-0.123346 -0.134775 -0.128098 -0.115061 -0.117369 -0.115746 -0.109711 -0.104261 -0.092952 -0.086822 -0.078787 -0.065743 -0.095326 -0.115183 -0.110633 -0.114020 -0.111851 -0.114413 -0.111885 -0.110791
-0.121624 -0.127414 -0.119158 -0.107490 -0.107899 -0.108961 -0.104325 -0.096687 -0.092548 -0.088388 -0.084310 -0.092131 -0.099156 -0.101437 -0.110484 -0.109678 -0.101826 -0.095868 -0.095766 -0.084060
-0.110613 -0.116854 -0.110020 -0.099101 -0.099055 -0.103614 -0.102053 -0.095582 -0.096577 -0.092323 -0.092065 -0.100353 -0.122455 -0.115007 -0.108920 -0.101987 -0.099114 -0.097593 -0.086349 -0.076634
          </tableData>
        </table>
        <table name="CL_dar">
          <breakpoints property="alpha_deg">-6.00 -4.00 -2.00 0.00 2.00 4.00 6.00 8.00 10.00 12.00 14.00 16.00 18.00 20.00 22.00 24.00 26.00 28.00 30.00 32.00 </breakpoints>
          <breakpoints property="beta_deg">-8.00 -4.00 0.00 4.00 8.00 </breakpoints>
          <breakpoints property="dar_deg">-30.00 -20.00 -10.00 0.00 10.00 20.00 30.00 </breakpoints>
          <tableData>
-0.110613 -0.116854 -0.110020 -0.099101 -0.099055 -0.103614 -0.102053 -0.095582 -0.096577 -0.092323 -0.092065 -0.100353 -0.122455 -0.115007 -0.108920 -0.101987 -0.099114 -0.097593 -0.086349 -0.076634
-0.121624 -0.127414 -0.119158 -0.107490 -0.107899 -0.108961 -0.104325 -0.096687 -0.092548 -0.088388 -0.084310 -0.092131 -0.099156 -0.101437 -0.110484 -0.109678 -0.101826 -0.095868 -0.095766 -0.084060
-0.123346 -0.134775 -0.128098 -0.115061 -0.117369 -0.115746 -0.109711 -0.104261 -0.092952 -0.086822 -0.078787 -0.065743 -0.095326 -0.115183 -0.110633 -0.114020 -0.111851 -0.114413 -0.111885 -0.110791
-0.106847 -0.120192 -0.112184 -0.101325 -0.101925 -0.100926 -0.101774 -0.099119 -0.080766 -0.061064 -0.048938 -0.037347 -0.086833 -0.096613 -0.094468 -0.098213 -0.103440 -0.101029 -0.103168 -0.099339
-0.097454 -0.111251 -0.105841 -0.099051 -0.101037 -0.100455 -0.102947 -0.095065 -0.083109 -0.047389 -0.030638 -0.041884 -0.075770 -0.077902 -0.071936 -0.071871 -0.080370 -0.080606 -0.086359 -0.095288
-0.100892 -0.105244 -0.104591 -0.094160 -0.092188 -0.102523 -0.100893 -0.097685 -0.095561 -0.099346 -0.100964 -0.104506 -0.096751 -0.087370 -0.077025 -0.068704 -0.064454 -0.060383 -0.048819 -0.042255
-0.103469 -0.106762 -0.107923 -0.096127 -0.094117 -0.094542 -0.098123 -0.097713 -0.090048 -0.089054 -0.088048 -0.085034 -0.072675 -0.076028 -0.079398 -0.078339 -0.071033 -0.063705 -0.061806 -0.049584
-0.102747 -0.120043 -0.113546 -0.104109 -0.105575 -0.104420 -0.097409 -0.096753 -0.088146 -0.091949 -0.085276 -0.075081 -0.077670 -0.084211 -0.080301 -0.083338 -0.080196 -0.082409 -0.080490 -0.078842
-0.085727 -0.101097 -0.097739 -0.090880 -0.088605 -0.086876 -0.084605 -0.084241 -0.072999 -0.070869 -0.063151 -0.062318 -0.067695 -0.074913 -0.071291 -0.074436 -0.073221 -0.073000 -0.077184 -0.061594
-0.084751 -0.093943 -0.089559 -0.084786 -0.084127 -0.084695 -0.085341 -0.078718 -0.072536 -0.068431 -0.062344 -0.058823 -0.057411 -0.058692 -0.053426 -0.050304 -0.058426 -0.056434 -0.056138 -0.067103
-0.053647 -0.059167 -0.062332 -0.064338 -0.063626 -0.063516 -0.057259 -0.053602 -0.054363 -0.052935 -0.059029 -0.059941 -0.056140 -0.046257 -0.043011 -0.035540 -0.030448 -0.028493 -0.014257 -0.013849
-0.057257 -0.057918 -0.063129 -0.062574 -0.063968 -0.062581 -0.057918 -0.054636 -0.048450 -0.051421 -0.050517 -0.045701 -0.034233 -0.039097 -0.037492 -0.040545 -0.033235 -0.028808 -0.027121 -0.015886
-0.057581 -0.073227 -0.072101 -0.072173 -0.073865 -0.071252 -0.062619 -0.058298 -0.055532 -0.056148 -0.047790 -0.041741 -0.044891 -0.044422 -0.039007 -0.041407 -0.040981 -0.043436 -0.040997 -0.035595
-0.044342 -0.052479 -0.055441 -0.055877 -0.055787 -0.053997 -0.051175 -0.048670 -0.041036 -0.043930 -0.036673 -0.027962 -0.033605 -0.033909 -0.032396 -0.033492 -0.032974 -0.033053 -0.034728 -0.032178
-0.044431 -0.054396 -0.052744 -0.051457 -0.052495 -0.053221 -0.055113 -0.048155 -0.040947 -0.044769 -0.037945 -0.030952 -0.032946 -0.026803 -0.028680 -0.026261 -0.033498 -0.028039 -0.034490 -0.035058
 0.000000  0.000000  0.000000  0.000000  0.000000  0.000000  0.000000  0.000000  0.000000  0.000000  0.000000  0.000000  0.000000  0.000000  0.000000  0.000000  0.000000  0.000000  0.000000  0.000000
 0.000000  0.000000  0.000000  0.000000  0.000000  0.000000  0.000000  0.000000  0.000000  0.000000  0.000000  0.000000  0.000000  0.000000  0.000000  0.000000  0.000000  0.000000  0.000000  0.000000
 0.000000  0.000000  0.000000  0.000000  0.000000  0.000000  0.000000  0.000000  0.000000  0.000000  0.000000  0.000000  0.000000  0.000000  0.000000  0.000000  0.000000  0.000000  0.000000  0.000000
 0.000000  0.000000  0.000000  0.000000  0.000000  0.000000  0.000000  0.000000  0.000000  0.000000  0.000000  0.000000  0.000000  0.000000  0.000000  0.000000  0.000000  0.000000  0.000000  0.000000
 0.000000  0.000000  0.000000  0.000000  0.000000  0.000000  0.000000  0.000000  0.000000  0.000000  0.000000  0.000000  0.000000  0.000000  0.000000  0.000000  0.000000  0.000000  0.000000  0.000000
 0.083663  0.080528  0.078984  0.072981  0.073044  0.072137  0.068094  0.072944  0.070233  0.061434  0.047015  0.049336  0.041967  0.039872  0.044701  0.043050  0.035463  0.028985  0.027681  0.028978
 0.069103  0.070797  0.065691  0.066843  0.065769  0.063863  0.062929  0.063429  0.060223  0.055368  0.047868  0.036392  0.046784  0.042329  0.037734  0.032057  0.030687  0.028789  0.028339  0.031206
 0.056735  0.047753  0.045829  0.047849  0.043947  0.042841  0.047608  0.044565  0.041610  0.031746  0.029185  0.028986  0.026023  0.023927  0.029266  0.024656  0.024655  0.018829  0.020708  0.017532
 0.052460  0.051217  0.048796  0.047599  0.045201  0.042879  0.044348  0.041700  0.038974  0.036637  0.032143  0.039154  0.029369  0.029230  0.023921  0.025918  0.022572  0.023735  0.018143  0.023010
 0.041759  0.040945  0.041290  0.039587  0.040353  0.038237  0.038285  0.040384  0.035424  0.031864  0.032614  0.026119  0.015454  0.025471  0.024903  0.016710  0.009147  0.012966  0.009527  0.010787
 0.142045  0.133156  0.130404  0.129167  0.125338  0.122932  0.124007  0.122631  0.117614  0.104359  0.094006  0.087960  0.068737  0.069530  0.063105  0.059198  0.053141  0.047326  0.035833  0.033050
 0.120768  0.121304  0.122006  0.119440  0.114848  0.111950  0.115991  0.114965  0.107501  0.092657  0.086334  0.060270  0.070304  0.070853  0.060469  0.050129  0.042117  0.039883  0.039683  0.043029
 0.102424  0.095996  0.095775  0.096692  0.093620  0.094189  0.095416  0.090084  0.081023  0.070661  0.055833  0.051090  0.054073  0.046139  0.045091  0.041880  0.036017  0.027710  0.029483  0.021425
 0.094351  0.093804  0.093809  0.090461  0.089841  0.087424  0.088959  0.080494  0.073239  0.071787  0.053618  0.059960  0.045862  0.046468  0.037207  0.040167  0.039190  0.033275  0.029241  0.028782
 0.075759  0.079731  0.080680  0.080785  0.081377  0.080311  0.076931  0.073768  0.067386  0.057441  0.051297  0.046134  0.034733  0.042672  0.035834  0.038110  0.028076  0.029453  0.023946  0.018400
 0.169326  0.160981  0.155602  0.151791  0.147548  0.144595  0.146510  0.158168  0.148399  0.133330  0.121599  0.105563  0.080041  0.078380  0.074474  0.070702  0.051113  0.043649  0.035227  0.038221
 0.148740  0.149705  0.147083  0.142272  0.139871  0.127127  0.137977  0.141095  0.137596  0.122699  0.103528  0.077454  0.085860  0.079038  0.063213  0.049662  0.044611  0.040055  0.039407  0.036068
 0.131446  0.124120  0.123278  0.119992  0.117577  0.106246  0.117749  0.119132  0.110962  0.093352  0.070909  0.067365  0.059406  0.052781  0.049269  0.045210  0.035730  0.023151  0.027048  0.019872
 0.124139  0.125373  0.123374  0.118782  0.115736  0.100609  0.114497  0.108463  0.098820  0.089430  0.067411  0.072070  0.058004  0.052149  0.042003  0.042896  0.034176  0.033442  0.027756  0.026561
 0.109487  0.113647  0.111111  0.107750  0.108491  0.103597  0.100303  0.096368  0.089854  0.074152  0.067896  0.059576  0.050108  0.050987  0.040072  0.038660  0.033183  0.031977  0.022818  0.018156
          </tableData>
        </table>
        <table name="CL_dr">
          <breakpoints property="alpha_deg">-6.00 -4.00 -2.00 0.00 2.00 4.00 6.00 8.00 10.00 12.00 14.00 16.00 18.00 20.00 22.00 24.00 26.00 28.00 30.00 32.00 </breakpoints>
          <breakpoints property="beta_deg">-8.00 -4.00 0.00 4.00 8.00 </breakpoints>
          <breakpoints property="dr_deg">-30.00 -20.00 -10.00 0.00 10.00 20.00 30.00 </breakpoints>
          <tableData>
 0.013411  0.007814  0.007478  0.004399  0.004984 -0.000251 -0.003325  0.000712 -0.003611  0.002245  0.005075  0.006331  0.003447  0.016715  0.015572  0.013627  0.007983  0.011759  0.003923  0.001939
 0.019427  0.013588  0.008711  0.009619  0.006475  0.004022  0.002350  0.000176  0.001463  0.001385  0.006105  0.007031 -0.003663  0.000489  0.005776  0.003528  0.005222 -0.000883  0.007270  0.007255
 0.025390  0.011604  0.011344  0.014535  0.009244  0.009494  0.011271  0.011146  0.006374 -0.001647 -0.000988  0.001085 -0.002612 -0.002098  0.007686  0.003672  0.000038 -0.003355 -0.003406  0.000710
 0.013672  0.012149  0.008870  0.009585  0.006952  0.004105  0.004394 -0.000614 -0.000677 -0.002831 -0.005584  0.001124 -0.009926 -0.006172 -0.002599 -0.001781 -0.005594 -0.002783 -0.002371  0.009498
 0.008548  0.005762  0.010124  0.008760  0.006266  0.003614  0.001918 -0.000452 -0.000362 -0.008012 -0.010353 -0.011039 -0.013648 -0.007410 -0.012549 -0.018117 -0.014968 -0.021997 -0.018316 -0.012020
 0.020386  0.016063  0.013767  0.013180  0.013689  0.010712  0.007328  0.011006  0.010974  0.012690  0.015506  0.015506  0.010691  0.020008  0.018201  0.018796  0.008356  0.012634  0.008315  0.008140
 0.024870  0.022205  0.017789  0.017684  0.014866  0.009631  0.010366  0.009731  0.009586  0.014466  0.010711  0.017154  0.007567  0.014711  0.014119  0.012613  0.011069  0.009698  0.004851  0.013217
 0.028039  0.018712  0.018232  0.020278  0.014257  0.012683  0.014786  0.013184  0.013865  0.004682  0.006915  0.007763  0.003379  0.006510  0.010894  0.006519  0.008033  0.001780  0.003482  0.003032
 0.019159  0.017177  0.015547  0.014797  0.013211  0.010842  0.010805  0.006514  0.006731  0.004723  0.000484  0.009237 -0.000393 -0.003567  0.002527  0.004307  0.004148  0.002104  0.005029  0.008538
 0.012223  0.011234  0.013087  0.013548  0.014415  0.011001  0.006723  0.004631  0.003580  0.002871 -0.004407 -0.003404 -0.012261 -0.000697 -0.005401 -0.009711 -0.011079 -0.008646 -0.013364 -0.009368
 0.022845  0.019481  0.018912  0.017218  0.019337  0.016940  0.014954  0.013674  0.011077  0.014975  0.015263  0.015311  0.011434  0.016682  0.015086  0.019072  0.009400  0.006304  0.004943  0.008271
 0.028973  0.027102  0.026092  0.024114  0.023494  0.020605  0.018286  0.015916  0.018854  0.022240  0.019996  0.021464  0.014310  0.017191  0.016584  0.012372  0.017066  0.014948  0.009141  0.009723
 0.033358  0.022880  0.024053  0.025708  0.019300  0.018067  0.020827  0.020105  0.019287  0.012599  0.012271  0.013694  0.009686  0.012872  0.015859  0.015377  0.012655  0.006293  0.010203  0.006711
 0.026725  0.024333  0.021383  0.024818  0.022298  0.020067  0.017227  0.016396  0.014595  0.016121  0.011589  0.015802  0.007525  0.009979  0.013833  0.013987  0.013029  0.011525  0.010654  0.020315
 0.019758  0.019110  0.020820  0.019501  0.017525  0.015642  0.015691  0.014743  0.013664  0.009158  0.005807  0.006200  0.003059  0.007226  0.008485  0.003233 -0.001970  0.001151 -0.002808 -0.000134
 0.000000  0.000000  0.000000  0.000000  0.000000  0.000000  0.000000  0.000000  0.000000  0.000000  0.000000  0.000000  0.000000  0.000000  0.000000  0.000000  0.000000  0.000000  0.000000  0.000000
 0.000000  0.000000  0.000000  0.000000  0.000000  0.000000  0.000000  0.000000  0.000000  0.000000  0.000000  0.000000  0.000000  0.000000  0.000000  0.000000  0.000000  0.000000  0.000000  0.000000
 0.000000  0.000000  0.000000  0.000000  0.000000  0.000000  0.000000  0.000000  0.000000  0.000000  0.000000  0.000000  0.000000  0.000000  0.000000  0.000000  0.000000  0.000000  0.000000  0.000000
 0.000000  0.000000  0.000000  0.000000  0.000000  0.000000  0.000000  0.000000  0.000000  0.000000  0.000000  0.000000  0.000000  0.000000  0.000000  0.000000  0.000000  0.000000  0.000000  0.000000
 0.000000  0.000000  0.000000  0.000000  0.000000  0.000000  0.000000  0.000000  0.000000  0.000000  0.000000  0.000000  0.000000  0.000000  0.000000  0.000000  0.000000  0.000000  0.000000  0.000000
 0.019758  0.019110  0.020820  0.019501  0.017525  0.015642  0.015691  0.014743  0.013664  0.009158  0.005807  0.006200  0.003059  0.007226  0.008485  0.003233 -0.001970  0.001151 -0.002808 -0.000134
 0.026725  0.024333  0.021383  0.024818  0.022298  0.020067  0.017227  0.016396  0.014595  0.016121  0.011589  0.015802  0.007525  0.009979  0.013833  0.013987  0.013029  0.011525  0.010654  0.020315
 0.033358  0.022880  0.024053  0.025708  0.019300  0.018067  0.020827  0.020105  0.019287  0.012599  0.012271  0.013694  0.009686  0.012872  0.015859  0.015377  0.012655  0.006293  0.010203  0.006711
 0.028973  0.027102  0.026092  0.024114  0.023494  0.020605  0.018286  0.015916  0.018854  0.022240  0.019996  0.021464  0.014310  0.017191  0.016584  0.012372  0.017066  0.014948  0.009141  0.009723
 0.022845  0.019481  0.018912  0.017218  0.019337  0.016940  0.014954  0.013674  0.011077  0.014975  0.015263  0.015311  0.011434  0.016682  0.015086  0.019072  0.009400  0.006304  0.004943  0.008271
 0.012223  0.011234  0.013087  0.013548  0.014415  0.011001  0.006723  0.004631  0.003580  0.002871 -0.004407 -0.003404 -0.012261 -0.000697 -0.005401 -0.009711 -0.011079 -0.008646 -0.013364 -0.009368
 0.019159  0.017177  0.015547  0.014797  0.013211  0.010842  0.010805  0.006514  0.006731  0.004723  0.000484  0.009237 -0.000393 -0.003567  0.002527  0.004307  0.004148  0.002104  0.005029  0.008538
 0.028039  0.018712  0.018232  0.020278  0.014257  0.012683  0.014786  0.013184  0.013865  0.004682  0.006915  0.007763  0.003379  0.006510  0.010894  0.006519  0.008033  0.001780  0.003482  0.003032
 0.024870  0.022205  0.017789  0.017684  0.014866  0.009631  0.010366  0.009731  0.009586  0.014466  0.010711  0.017154  0.007567  0.014711  0.014119  0.012613  0.011069  0.009698  0.004851  0.013217
 0.020386  0.016063  0.013767  0.013180  0.013689  0.010712  0.007328  0.011006  0.010974  0.012690  0.015506  0.015506  0.010691  0.020008  0.018201  0.018796  0.008356  0.012634  0.008315  0.008140
 0.008548  0.005762  0.010124  0.008760  0.006266  0.003614  0.001918 -0.000452 -0.000362 -0.008012 -0.010353 -0.011039 -0.013648 -0.007410 -0.012549 -0.018117 -0.014968 -0.021997 -0.018316 -0.012020
 0.013672  0.012149  0.008870  0.009585  0.006952  0.004105  0.004394 -0.000614 -0.000677 -0.002831 -0.005584  0.001124 -0.009926 -0.006172 -0.002599 -0.001781 -0.005594 -0.002783 -0.002371  0.009498
 0.025390  0.011604  0.011344  0.014535  0.009244  0.009494  0.011271  0.011146  0.006374 -0.001647 -0.000988  0.001085 -0.002612 -0.002098  0.007686  0.003672  0.000038 -0.003355 -0.003406  0.000710
 0.019427  0.013588  0.008711  0.009619  0.006475  0.004022  0.002350  0.000176  0.001463  0.001385  0.006105  0.007031 -0.003663  0.000489  0.005776  0.003528  0.005222 -0.000883  0.007270  0.007255
 0.013411  0.007814  0.007478  0.004399  0.004984 -0.000251 -0.003325  0.000712 -0.003611  0.002245  0.005075  0.006331  0.003447  0.016715  0.015572  0.013627  0.007983  0.011759  0.003923  0.001939
          </tableData>
        </table>
        <property>CL0UncertVal</property>
        <product>
          <property>cLq</property>
          <property>q_norm</property>
          <property>CLqUncertGain</property>
        </product>
      </add>
    </function>
    <function name="CD">
      <add>
        <table name="CD_base">
          <breakpoints property="alpha_deg">-6.00 -4.00 -2.00 0.00 2.00 4.00 6.00 8.00 10.00 12.00 14.00 16.00 18.00 20.00 22.00 24.00 26.00 28.00 30.00 32.00 </breakpoints>
          <breakpoints property="beta_deg">-12.00 -8.00 -4.00 0.00 4.00 8.00 12.00 </breakpoints>
          <tableData>
 0.106848  0.094454  0.087198  0.084551  0.086770  0.092591  0.102927  0.120442  0.146951  0.178997  0.212142  0.254083  0.302872  0.360468  0.428234  0.499775  0.573873  0.651092  0.726643  0.802788
 0.085316  0.070914  0.062436  0.059800  0.061081  0.067657  0.079647  0.098256  0.126526  0.161766  0.198832  0.240798  0.291543  0.350068  0.416106  0.486295  0.562141  0.641345  0.719533  0.797514
 0.078950  0.062350  0.054707  0.052546  0.054238  0.059755  0.070145  0.088266  0.116597  0.151042  0.190147  0.234547  0.286714  0.347375  0.413943  0.485208  0.559321  0.637255  0.718074  0.797028
 0.075360  0.059012  0.051491  0.048657  0.051436  0.057256  0.068335  0.085832  0.114343  0.151117  0.189252  0.235228  0.288229  0.349948  0.413515  0.484797  0.558938  0.640176  0.721363  0.803714
 0.078950  0.062350  0.054707  0.052546  0.054238  0.059755  0.070145  0.088266  0.116597  0.151042  0.190147  0.234547  0.286714  0.347375  0.413943  0.485208  0.559321  0.637255  0.718074  0.797028
 0.085316  0.070914  0.062436  0.059800  0.061081  0.067657  0.079647  0.098256  0.126526  0.161766  0.198832  0.240798  0.291543  0.350068  0.416106  0.486295  0.562141  0.641345  0.719533  0.797514
 0.106848  0.094454  0.087198  0.084551  0.086770  0.092591  0.102927  0.120442  0.146951  0.178997  0.212142  0.254083  0.302872  0.360468  0.428234  0.499775  0.573873  0.651092  0.726643  0.802788
          </tableData>
        </table>
        <product>
          <table name="CD_de">
            <breakpoints property="alpha_deg">-6.00 -4.00 -2.00 0.00 2.00 4.00 6.00 8.00 10.00 12.00 14.00 16.00 18.00 20.00 22.00 24.00 26.00 28.00 30.00 32.00 </breakpoints>
            <breakpoints property="beta_deg">-8.00 0.00 8.00 </breakpoints>
            <breakpoints property="de_deg">-30.00 -20.00 -10.00 0.00 10.00 20.00 30.00 </breakpoints>
            <tableData>
 0.098696  0.088860  0.080807  0.073263  0.067859  0.059920  0.048908  0.038344  0.027594  0.013619 -0.000379 -0.017107 -0.034473 -0.053204 -0.073397 -0.088286 -0.105356 -0.128101 -0.145553 -0.163910
 0.094852  0.087854  0.079508  0.071251  0.063010  0.055181  0.046209  0.038540  0.029221  0.019552  0.008495 -0.014137 -0.034476 -0.050753 -0.070434 -0.090521 -0.107379 -0.131342 -0.149989 -0.170354
 0.098696  0.088860  0.080807  0.073263  0.067859  0.059920  0.048908  0.038344  0.027594  0.013619 -0.000379 -0.017107 -0.034473 -0.053204 -0.073397 -0.088286 -0.105356 -0.128101 -0.145553 -0.163910
 0.079957  0.071250  0.064932  0.058082  0.053913  0.047458  0.039251  0.031007  0.022983  0.011441  0.001345 -0.011120 -0.023004 -0.035623 -0.049569 -0.061567 -0.072933 -0.087702 -0.102432 -0.117529
 0.070126  0.062401  0.054142  0.047107  0.039602  0.031342  0.023584  0.016432  0.008203 -0.001849 -0.011002 -0.027193 -0.039935 -0.053874 -0.065792 -0.082058 -0.096685 -0.111400 -0.126652 -0.144604
 0.079957  0.071250  0.064932  0.058082  0.053913  0.047458  0.039251  0.031007  0.022983  0.011441  0.001345 -0.011120 -0.023004 -0.035623 -0.049569 -0.061567 -0.072933 -0.087702 -0.102432 -0.117529
 0.027632  0.023774  0.020098  0.017215  0.016320  0.014549  0.011247  0.008461  0.005902  0.002381 -0.000412 -0.006351 -0.013578 -0.015922 -0.025092 -0.029719 -0.035458 -0.041929 -0.047907 -0.051547
 0.014376  0.012432  0.010068  0.008090  0.006229  0.004933  0.003526  0.002016  0.000591 -0.001766 -0.004673 -0.008486 -0.014247 -0.020247 -0.024511 -0.034277 -0.038614 -0.048560 -0.055848 -0.061832
 0.027632  0.023774  0.020098  0.017215  0.016320  0.014549  0.011247  0.008461  0.005902  0.002381 -0.000412 -0.006351 -0.013578 -0.015922 -0.025092 -0.029719 -0.035458 -0.041929 -0.047907 -0.051547
 0.000000  0.000000  0.000000  0.000000  0.000000  0.000000  0.000000  0.000000  0.000000  0.000000  0.000000  0.000000  0.000000  0.000000  0.000000  0.000000  0.000000  0.000000  0.000000  0.000000
 0.000000  0.000000  0.000000  0.000000  0.000000  0.000000  0.000000  0.000000  0.000000  0.000000  0.000000  0.000000  0.000000  0.000000  0.000000  0.000000  0.000000  0.000000  0.000000  0.000000
 0.000000  0.000000  0.000000  0.000000  0.000000  0.000000  0.000000  0.000000  0.000000  0.000000  0.000000  0.000000  0.000000  0.000000  0.000000  0.000000  0.000000  0.000000  0.000000  0.000000
-0.000858  0.002171  0.005362  0.008875  0.013906  0.017961  0.021696  0.026471  0.030294  0.036236  0.043271  0.048098  0.052692  0.056965  0.062431  0.067960  0.071822  0.074371  0.080820  0.082342
 0.000710  0.004161  0.006087  0.008923  0.012011  0.015515  0.020413  0.025632  0.031468  0.035791  0.042098  0.048394  0.055218  0.059807  0.065778  0.067998  0.072131  0.071191  0.075328  0.082560
-0.000858  0.002171  0.005362  0.008875  0.013906  0.017961  0.021696  0.026471  0.030294  0.036236  0.043271  0.048098  0.052692  0.056965  0.062431  0.067960  0.071822  0.074371  0.080820  0.082342
 0.008425  0.015583  0.022402  0.029669  0.038193  0.046852  0.056002  0.065244  0.075099  0.085102  0.095346  0.101549  0.109783  0.114612  0.123540  0.132498  0.134231  0.141961  0.148348  0.147805
 0.011081  0.017163  0.024155  0.031339  0.038056  0.045853  0.055646  0.066016  0.077112  0.087471  0.098828  0.110362  0.117917  0.123114  0.127490  0.130922  0.136122  0.141523  0.148092  0.155005
 0.008425  0.015583  0.022402  0.029669  0.038193  0.046852  0.056002  0.065244  0.075099  0.085102  0.095346  0.101549  0.109783  0.114612  0.123540  0.132498  0.134231  0.141961  0.148348  0.147805
 0.044886  0.054272  0.064400  0.075707  0.087451  0.098412  0.110270  0.122996  0.138176  0.152131  0.161966  0.165272  0.172626  0.181940  0.185812  0.192454  0.194456  0.201872  0.201137  0.193151
 0.046117  0.057509  0.068680  0.080153  0.089091  0.096650  0.111303  0.130682  0.146621  0.160068  0.175242  0.187581  0.195122  0.199506  0.200035  0.198615  0.196468  0.190606  0.190304  0.188483
 0.044886  0.054272  0.064400  0.075707  0.087451  0.098412  0.110270  0.122996  0.138176  0.152131  0.161966  0.165272  0.172626  0.181940  0.185812  0.192454  0.194456  0.201872  0.201137  0.193151
            </tableData>
          </table>
           <property>CDdeUncertGain</property>
        </product>
        <table name="CD_dal">
          <breakpoints property="alpha_deg">-6.00 -4.00 -2.00 0.00 2.00 4.00 6.00 8.00 10.00 12.00 14.00 16.00 18.00 20.00 22.00 24.00 26.00 28.00 30.00 32.00 </breakpoints>
          <breakpoints property="beta_deg">-8.00 -4.00 0.00 4.00 8.00 </breakpoints>
          <breakpoints property="dal_deg">-30.00 -20.00 -10.00 0.00 10.00 20.00 30.00 </breakpoints>
          <tableData>
-0.005139  0.000322  0.005036  0.008441  0.013643  0.017333  0.019936  0.022986  0.026217  0.026788  0.031659  0.033958  0.036407  0.039246  0.039802  0.041646  0.046427  0.046769  0.047247  0.047456
-0.004924  0.002087  0.007848  0.012010  0.016613  0.018776  0.023587  0.028076  0.032057  0.034459  0.034059  0.039026  0.039561  0.043157  0.042631  0.046838  0.048564  0.051679  0.051336  0.053354
-0.002203  0.003863  0.008596  0.013282  0.016500  0.018816  0.023958  0.030048  0.034289  0.036539  0.036108  0.039751  0.040686  0.042888  0.044932  0.046746  0.046911  0.043574  0.047307  0.046211
-0.006441 -0.000302  0.005604  0.010526  0.014512  0.017997  0.023875  0.029950  0.035023  0.039899  0.040340  0.038949  0.045051  0.047430  0.045914  0.042508  0.043067  0.042637  0.045036  0.045858
-0.008666 -0.004068  0.001527  0.006763  0.011885  0.016515  0.021457  0.029135  0.034619  0.038548  0.040979  0.044316  0.042725  0.045718  0.047841  0.047563  0.040831  0.037799  0.034525  0.039951
-0.009994 -0.006794 -0.003331 -0.000407  0.003840  0.007097  0.009539  0.012060  0.014529  0.015951  0.020740  0.022959  0.024635  0.028171  0.028573  0.032460  0.033959  0.035954  0.036749  0.036907
-0.010126 -0.004958 -0.000720  0.002573  0.006119  0.008954  0.012467  0.015457  0.018282  0.021656  0.021859  0.026800  0.028209  0.033278  0.032245  0.036398  0.039276  0.039774  0.039274  0.042161
-0.007530 -0.003560 -0.000003  0.003698  0.005737  0.008854  0.012288  0.016381  0.019228  0.021515  0.022586  0.025018  0.030927  0.031595  0.033248  0.034486  0.036213  0.034803  0.036067  0.034764
-0.012458 -0.007262 -0.003210  0.000916  0.004487  0.007993  0.012655  0.017543  0.020154  0.023424  0.025977  0.024124  0.028986  0.033220  0.033649  0.032085  0.032067  0.033074  0.033559  0.037386
-0.015566 -0.011701 -0.007607 -0.003005  0.001282  0.003801  0.008341  0.013510  0.019706  0.022263  0.023773  0.028880  0.029226  0.031960  0.034207  0.031751  0.031901  0.029733  0.025191  0.025574
-0.010244 -0.008073 -0.006215 -0.004437 -0.000951  0.001438  0.003511  0.005444  0.007229  0.008807  0.012490  0.012438  0.012523  0.015650  0.017513  0.018358  0.019436  0.020972  0.021379  0.023388
-0.009558 -0.006060 -0.003735 -0.002231  0.000154  0.002189  0.004778  0.006724  0.009281  0.010613  0.012565  0.016028  0.016812  0.018479  0.017310  0.020224  0.021236  0.023722  0.023019  0.027813
-0.006560 -0.004287 -0.002451 -0.001003  0.000122  0.002281  0.004130  0.006732  0.008797  0.009742  0.011483  0.013463  0.015254  0.016794  0.019384  0.019364  0.021967  0.020179  0.020915  0.022092
-0.011906 -0.008984 -0.006180 -0.004109 -0.001700  0.000834  0.003464  0.006448  0.008051  0.011273  0.011702  0.011693  0.015879  0.016672  0.017161  0.016209  0.018480  0.017774  0.019163  0.022006
-0.012614 -0.012319 -0.010790 -0.008764 -0.006102 -0.004242 -0.001910  0.001801  0.005014  0.006347  0.004904  0.009813  0.010778  0.012707  0.015319  0.014329  0.014492  0.011765  0.012132  0.014559
 0.000000  0.000000  0.000000  0.000000  0.000000  0.000000  0.000000  0.000000  0.000000  0.000000  0.000000  0.000000  0.000000  0.000000  0.000000  0.000000  0.000000  0.000000  0.000000  0.000000
 0.000000  0.000000  0.000000  0.000000  0.000000  0.000000  0.000000  0.000000  0.000000  0.000000  0.000000  0.000000  0.000000  0.000000  0.000000  0.000000  0.000000  0.000000  0.000000  0.000000
 0.000000  0.000000  0.000000  0.000000  0.000000  0.000000  0.000000  0.000000  0.000000  0.000000  0.000000  0.000000  0.000000  0.000000  0.000000  0.000000  0.000000  0.000000  0.000000  0.000000
 0.000000  0.000000  0.000000  0.000000  0.000000  0.000000  0.000000  0.000000  0.000000  0.000000  0.000000  0.000000  0.000000  0.000000  0.000000  0.000000  0.000000  0.000000  0.000000  0.000000
 0.000000  0.000000  0.000000  0.000000  0.000000  0.000000  0.000000  0.000000  0.000000  0.000000  0.000000  0.000000  0.000000  0.000000  0.000000  0.000000  0.000000  0.000000  0.000000  0.000000
 0.005109  0.004622  0.003645  0.002773  0.004111  0.003604  0.002282  0.000783 -0.000050 -0.003815 -0.003539 -0.003438 -0.004790 -0.005936 -0.007581 -0.008153 -0.010659 -0.009747 -0.013318 -0.016038
 0.007578  0.007057  0.006096  0.005175  0.004635  0.003719  0.002696  0.001419  0.000717 -0.001630 -0.002530 -0.002551 -0.004989 -0.005922 -0.008430 -0.010198 -0.010672 -0.012743 -0.015078 -0.015572
 0.012609  0.010920  0.008401  0.006527  0.004135  0.002109  0.000615 -0.000903 -0.002838 -0.004933 -0.005372 -0.006556 -0.008430 -0.009889 -0.010470 -0.013147 -0.013777 -0.017290 -0.019347 -0.017220
 0.009944  0.007612  0.005627  0.004002  0.002399  0.000830 -0.000393 -0.002349 -0.004583 -0.006266 -0.008834 -0.009839 -0.010204 -0.013140 -0.015189 -0.017712 -0.015670 -0.015665 -0.016531 -0.011135
 0.008809  0.005036  0.003117  0.001022 -0.000165 -0.002635 -0.003744 -0.005378 -0.007084 -0.008638 -0.012701 -0.014386 -0.016335 -0.017274 -0.018724 -0.019438 -0.017578 -0.017284 -0.011719 -0.010001
 0.018007  0.016153  0.014157  0.012552  0.012504  0.011375  0.008173  0.005390  0.002449 -0.002647 -0.003798 -0.005472 -0.007198 -0.011476 -0.012444 -0.013374 -0.017343 -0.019829 -0.020636 -0.027953
 0.021277  0.019727  0.017201  0.014620  0.013461  0.011518  0.009300  0.006031  0.003835  0.000741 -0.001822 -0.005588 -0.009713 -0.013819 -0.016718 -0.021080 -0.023274 -0.025533 -0.031150 -0.025960
 0.027009  0.023668  0.020251  0.016838  0.013496  0.010562  0.007743  0.004201  0.000919 -0.003219 -0.005748 -0.008581 -0.012184 -0.017183 -0.018596 -0.022083 -0.023996 -0.028837 -0.033512 -0.035660
 0.025000  0.020993  0.017445  0.014924  0.012462  0.009478  0.006209  0.001937 -0.002104 -0.005238 -0.009136 -0.012298 -0.013852 -0.018609 -0.022995 -0.025850 -0.024967 -0.026098 -0.027659 -0.023272
 0.022050  0.015650  0.011603  0.008108  0.006198  0.002994 -0.000527 -0.003967 -0.007130 -0.011597 -0.016316 -0.020378 -0.022808 -0.026013 -0.026275 -0.027214 -0.028537 -0.027145 -0.023491 -0.020633
 0.029661  0.027575  0.024362  0.021891  0.021703  0.019834  0.016114  0.011962  0.006717  0.002967  0.002847  0.000363 -0.005523 -0.010627 -0.012500 -0.015909 -0.020142 -0.023636 -0.028630 -0.036137
 0.034004  0.031130  0.027290  0.023806  0.021659  0.019447  0.016605  0.012374  0.008756  0.005109  0.002723  0.001973 -0.008039 -0.013990 -0.017715 -0.023969 -0.027829 -0.029751 -0.035804 -0.037471
 0.041442  0.035623  0.031106  0.025586  0.022538  0.019101  0.015831  0.011316  0.006978  0.002099  0.001153 -0.001866 -0.010060 -0.018195 -0.020645 -0.025870 -0.028599 -0.035213 -0.040214 -0.044069
 0.039025  0.033700  0.028515  0.023836  0.021144  0.018055  0.015203  0.010582  0.005891  0.001989 -0.000998 -0.006010 -0.012025 -0.017154 -0.024122 -0.028200 -0.028959 -0.030529 -0.035098 -0.032051
 0.035227  0.026677  0.020440  0.014953  0.011998  0.008714  0.006058  0.002010 -0.002426 -0.005176 -0.010300 -0.013909 -0.022080 -0.027102 -0.028687 -0.032605 -0.033395 -0.035841 -0.033370 -0.028585
          </tableData>
        </table>
        <table name="CD_dar">
          <breakpoints property="alpha_deg">-6.00 -4.00 -2.00 0.00 2.00 4.00 6.00 8.00 10.00 12.00 14.00 16.00 18.00 20.00 22.00 24.00 26.00 28.00 30.00 32.00 </breakpoints>
          <breakpoints property="beta_deg">-8.00 -4.00 0.00 4.00 8.00 </breakpoints>
          <breakpoints property="dar_deg">-30.00 -20.00 -10.00 0.00 10.00 20.00 30.00 </breakpoints>
          <tableData>
 0.035227  0.026677  0.020440  0.014953  0.011998  0.008714  0.006058  0.002010 -0.002426 -0.005176 -0.010300 -0.013909 -0.022080 -0.027102 -0.028687 -0.032605 -0.033395 -0.035841 -0.033370 -0.028585
 0.039025  0.033700  0.028515  0.023836  0.021144  0.018055  0.015203  0.010582  0.005891  0.001989 -0.000998 -0.006010 -0.012025 -0.017154 -0.024122 -0.028200 -0.028959 -0.030529 -0.035098 -0.032051
 0.041442  0.035623  0.031106  0.025586  0.022538  0.019101  0.015831  0.011316  0.006978  0.002099  0.001153 -0.001866 -0.010060 -0.018195 -0.020645 -0.025870 -0.028599 -0.035213 -0.040214 -0.044069
 0.034004  0.031130  0.027290  0.023806  0.021659  0.019447  0.016605  0.012374  0.008756  0.005109  0.002723  0.001973 -0.008039 -0.013990 -0.017715 -0.023969 -0.027829 -0.029751 -0.035804 -0.037471
 0.029661  0.027575  0.024362  0.021891  0.021703  0.019834  0.016114  0.011962  0.006717  0.002967  0.002847  0.000363 -0.005523 -0.010627 -0.012500 -0.015909 -0.020142 -0.023636 -0.028630 -0.036137
 0.022050  0.015650  0.011603  0.008108  0.006198  0.002994 -0.000527 -0.003967 -0.007130 -0.011597 -0.016316 -0.020378 -0.022808 -0.026013 -0.026275 -0.027214 -0.028537 -0.027145 -0.023491 -0.020633
 0.025000  0.020993  0.017445  0.014924  0.012462  0.009478  0.006209  0.001937 -0.002104 -0.005238 -0.009136 -0.012298 -0.013852 -0.018609 -0.022995 -0.025850 -0.024967 -0.026098 -0.027659 -0.023272
 0.027009  0.023668  0.020251  0.016838  0.013496  0.010562  0.007743  0.004201  0.000919 -0.003219 -0.005748 -0.008581 -0.012184 -0.017183 -0.018596 -0.022083 -0.023996 -0.028837 -0.033512 -0.035660
 0.021277  0.019727  0.017201  0.014620  0.013461  0.011518  0.009300  0.006031  0.003835  0.000741 -0.001822 -0.005588 -0.009713 -0.013819 -0.016718 -0.021080 -0.023274 -0.025533 -0.031150 -0.025960
 0.018007  0.016153  0.014157  0.012552  0.012504  0.011375  0.008173  0.005390  0.002449 -0.002647 -0.003798 -0.005472 -0.007198 -0.011476 -0.012444 -0.013374 -0.017343 -0.019829 -0.020636 -0.027953
 0.008809  0.005036  0.003117  0.001022 -0.000165 -0.002635 -0.003744 -0.005378 -0.007084 -0.008638 -0.012701 -0.014386 -0.016335 -0.017274 -0.018724 -0.019438 -0.017578 -0.017284 -0.011719 -0.010001
 0.009944  0.007612  0.005627  0.004002  0.002399  0.000830 -0.000393 -0.002349 -0.004583 -0.006266 -0.008834 -0.009839 -0.010204 -0.013140 -0.015189 -0.017712 -0.015670 -0.015665 -0.016531 -0.011135
 0.012609  0.010920  0.008401  0.006527  0.004135  0.002109  0.000615 -0.000903 -0.002838 -0.004933 -0.005372 -0.006556 -0.008430 -0.009889 -0.010470 -0.013147 -0.013777 -0.017290 -0.019347 -0.017220
 0.007578  0.007057  0.006096  0.005175  0.004635  0.003719  0.002696  0.001419  0.000717 -0.001630 -0.002530 -0.002551 -0.004989 -0.005922 -0.008430 -0.010198 -0.010672 -0.012743 -0.015078 -0.015572
 0.005109  0.004622  0.003645  0.002773  0.004111  0.003604  0.002282  0.000783 -0.000050 -0.003815 -0.003539 -0.003438 -0.004790 -0.005936 -0.007581 -0.008153 -0.010659 -0.009747 -0.013318 -0.016038
 0.000000  0.000000  0.000000  0.000000  0.000000  0.000000  0.000000  0.000000  0.000000  0.000000  0.000000  0.000000  0.000000  0.000000  0.000000  0.000000  0.000000  0.000000  0.000000  0.000000
 0.000000  0.000000  0.000000  0.000000  0.000000  0.000000  0.000000  0.000000  0.000000  0.000000  0.000000  0.000000  0.000000  0.000000  0.000000  0.000000  0.000000  0.000000  0.000000  0.000000
 0.000000  0.000000  0.000000  0.000000  0.000000  0.000000  0.000000  0.000000  0.000000  0.000000  0.000000  0.000000  0.000000  0.000000  0.000000  0.000000  0.000000  0.000000  0.000000  0.000000
 0.000000  0.000000  0.000000  0.000000  0.000000  0.000000  0.000000  0.000000  0.000000  0.000000  0.000000  0.000000  0.000000  0.000000  0.000000  0.000000  0.000000  0.000000  0.000000  0.000000
 0.000000  0.000000  0.000000  0.000000  0.000000  0.000000  0.000000  0.000000  0.000000  0.000000  0.000000  0.000000  0.000000  0.000000  0.000000  0.000000  0.000000  0.000000  0.000000  0.000000
-0.012614 -0.012319 -0.010790 -0.008764 -0.006102 -0.004242 -0.001910  0.001801  0.005014  0.006347  0.004904  0.009813  0.010778  0.012707  0.015319  0.014329  0.014492  0.011765  0.012132  0.014559
-0.011906 -0.008984 -0.006180 -0.004109 -0.001700  0.000834  0.003464  0.006448  0.008051  0.011273  0.011702  0.011693  0.015879  0.016672  0.017161  0.016209  0.018480  0.017774  0.019163  0.022006
-0.006560 -0.004287 -0.002451 -0.001003  0.000122  0.002281  0.004130  0.006732  0.008797  0.009742  0.011483  0.013463  0.015254  0.016794  0.019384  0.019364  0.021967  0.020179  0.020915  0.022092
-0.009558 -0.006060 -0.003735 -0.002231  0.000154  0.002189  0.004778  0.006724  0.009281  0.010613  0.012565  0.016028  0.016812  0.018479  0.017310  0.020224  0.021236  0.023722  0.023019  0.027813
-0.010244 -0.008073 -0.006215 -0.004437 -0.000951  0.001438  0.003511  0.005444  0.007229  0.008807  0.012490  0.012438  0.012523  0.015650  0.017513  0.018358  0.019436  0.020972  0.021379  0.023388
-0.015566 -0.011701 -0.007607 -0.003005  0.001282  0.003801  0.008341  0.013510  0.019706  0.022263  0.023773  0.028880  0.029226  0.031960  0.034207  0.031751  0.031901  0.029733  0.025191  0.025574
-0.012458 -0.007262 -0.003210  0.000916  0.004487  0.007993  0.012655  0.017543  0.020154  0.023424  0.025977  0.024124  0.028986  0.033220  0.033649  0.032085  0.032067  0.033074  0.033559  0.037386
-0.007530 -0.003560 -0.000003  0.003698  0.005737  0.008854  0.012288  0.016381  0.019228  0.021515  0.022586  0.025018  0.030927  0.031595  0.033248  0.034486  0.036213  0.034803  0.036067  0.034764
-0.010126 -0.004958 -0.000720  0.002573  0.006119  0.008954  0.012467  0.015457  0.018282  0.021656  0.021859  0.026800  0.028209  0.033278  0.032245  0.036398  0.039276  0.039774  0.039274  0.042161
-0.009994 -0.006794 -0.003331 -0.000407  0.003840  0.007097  0.009539  0.012060  0.014529  0.015951  0.020740  0.022959  0.024635  0.028171  0.028573  0.032460  0.033959  0.035954  0.036749  0.036907
-0.008666 -0.004068  0.001527  0.006763  0.011885  0.016515  0.021457  0.029135  0.034619  0.038548  0.040979  0.044316  0.042725  0.045718  0.047841  0.047563  0.040831  0.037799  0.034525  0.039951
-0.006441 -0.000302  0.005604  0.010526  0.014512  0.017997  0.023875  0.029950  0.035023  0.039899  0.040340  0.038949  0.045051  0.047430  0.045914  0.042508  0.043067  0.042637  0.045036  0.045858
-0.002203  0.003863  0.008596  0.013282  0.016500  0.018816  0.023958  0.030048  0.034289  0.036539  0.036108  0.039751  0.040686  0.042888  0.044932  0.046746  0.046911  0.043574  0.047307  0.046211
-0.004924  0.002087  0.007848  0.012010  0.016613  0.018776  0.023587  0.028076  0.032057  0.034459  0.034059  0.039026  0.039561  0.043157  0.042631  0.046838  0.048564  0.051679  0.051336  0.053354
-0.005139  0.000322  0.005036  0.008441  0.013643  0.017333  0.019936  0.022986  0.026217  0.026788  0.031659  0.033958  0.036407  0.039246  0.039802  0.041646  0.046427  0.046769  0.047247  0.047456
          </tableData>
        </table>
        <table name="CD_dr">
          <breakpoints property="alpha_deg">-6.00 -4.00 -2.00 0.00 2.00 4.00 6.00 8.00 10.00 12.00 14.00 16.00 18.00 20.00 22.00 24.00 26.00 28.00 30.00 32.00 </breakpoints>
          <breakpoints property="beta_deg">-8.00 -4.00 0.00 4.00 8.00 </breakpoints>
          <breakpoints property="dr_deg">-30.00 -20.00 -10.00 0.00 10.00 20.00 30.00 </breakpoints>
          <tableData>
-0.004252 -0.003434 -0.003031 -0.002467  0.000175  0.001458  0.001841  0.002540  0.002289  0.003120  0.005929  0.006527  0.007711  0.010764  0.012486  0.015014  0.017007  0.018819  0.017797  0.017068
 0.003503  0.005435  0.006043  0.006567  0.008114  0.008888  0.009684  0.010239  0.011464  0.011856  0.014041  0.015682  0.012973  0.013191  0.012377  0.012444  0.015234  0.013631  0.018113  0.019304
 0.002972  0.004548  0.005040  0.005963  0.006353  0.007407  0.008990  0.010541  0.012222  0.011999  0.014028  0.015284  0.013966  0.012869  0.012305  0.009887  0.011751  0.008608  0.008643  0.010731
 0.001064  0.003123  0.004232  0.004903  0.006365  0.007996  0.009545  0.010498  0.011876  0.013860  0.014122  0.014256  0.011670  0.011975  0.012288  0.012898  0.013376  0.013201  0.013265  0.020272
 0.000000  0.000000  0.000000  0.000000  0.000000  0.000000  0.000000  0.000000  0.000000  0.000000  0.000000  0.000000  0.000000  0.000000  0.000000  0.000000  0.000000  0.000000  0.000000  0.000000
 0.018054  0.018879  0.019026  0.020265  0.022980  0.023952  0.024351  0.025009  0.026658  0.027974  0.024517  0.019607  0.016038  0.016947  0.017339  0.019364  0.022175  0.021447  0.013779  0.011509
 0.020995  0.022775  0.023808  0.024151  0.025879  0.026543  0.027947  0.028755  0.030186  0.031224  0.031532  0.028851  0.018501  0.018608  0.017990  0.017225  0.014614  0.013532  0.012347  0.020323
-0.004252 -0.003434 -0.003031 -0.002467  0.000175  0.001458  0.001841  0.002540  0.002289  0.003120  0.005929  0.006527  0.007711  0.010764  0.012486  0.015014  0.017007  0.018819  0.017797  0.017068
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          </tableData>
        </table>
        <property>CD0UncertVal</property>
      </add>
    </function>
    <function name="Cm">
      <add>
        <table name="Cm_aoa">
          <breakpoints property="alpha_deg">-6.00 -4.00 -2.00 0.00 2.00 4.00 6.00 8.00 10.00 12.00 14.00 16.00 18.00 20.00 22.00 24.00 26.00 28.00 30.00 32.00 </breakpoints>
          <tableData>
 0.027800  0.025667  0.024533  0.024400  0.023333  0.021500  0.018900  0.016167  0.012200  0.007000  0.001933 -0.004833 -0.013300 -0.024633 -0.039233 -0.057100 -0.075367 -0.087300 -0.092900 -0.098500
          </tableData>
        </table>
        <table name="Cm_aos">
          <breakpoints property="alpha_deg">-6.00 -4.00 -2.00 0.00 2.00 4.00 6.00 8.00 10.00 12.00 14.00 16.00 18.00 20.00 22.00 24.00 26.00 28.00 30.00 32.00 </breakpoints>
          <breakpoints property="beta_deg">-12.00 -8.00 -4.00 0.00 4.00 8.00 12.00 </breakpoints>
          <tableData>
-0.004354  0.000466  0.000303 -0.001761 -0.002356 -0.002396 -0.005680 -0.006849 -0.009664 -0.016182 -0.024683 -0.017824 -0.014095 -0.015746 -0.012045 -0.019911 -0.027228 -0.027753 -0.029658 -0.030731
-0.001533  0.003026  0.002379  0.000303  0.000703  0.001407 -0.001793 -0.002058 -0.003364 -0.006665 -0.016435 -0.009629 -0.006290 -0.008272  0.002008  0.010606  0.008265  0.006631  0.000470 -0.001998
 0.001765  0.003891  0.004506  0.003586  0.005088  0.006336  0.004958  0.005839  0.005687  0.005333 -0.000619  0.002056  0.001368 -0.000172  0.010276  0.015044  0.009490  0.006754  0.004502  0.004239
 0.000000  0.000000  0.000000  0.000000  0.000000  0.000000  0.000000  0.000000  0.000000  0.000000  0.000000  0.000000  0.000000  0.000000  0.000000  0.000000  0.000000  0.000000  0.000000  0.000000
 0.001765  0.003891  0.004506  0.003586  0.005088  0.006336  0.004958  0.005839  0.005687  0.005333 -0.000619  0.002056  0.001368 -0.000172  0.010276  0.015044  0.009490  0.006754  0.004502  0.004239
-0.001533  0.003026  0.002379  0.000303  0.000703  0.001407 -0.001793 -0.002058 -0.003364 -0.006665 -0.016435 -0.009629 -0.006290 -0.008272  0.002008  0.010606  0.008265  0.006631  0.000470 -0.001998
-0.004354  0.000466  0.000303 -0.001761 -0.002356 -0.002396 -0.005680 -0.006849 -0.009664 -0.016182 -0.024683 -0.017824 -0.014095 -0.015746 -0.012045 -0.019911 -0.027228 -0.027753 -0.029658 -0.030731
          </tableData>
        </table>
        <product>
          <table name="Cm_de">
            <breakpoints property="alpha_deg">-6.00 -4.00 -2.00 0.00 2.00 4.00 6.00 8.00 10.00 12.00 14.00 16.00 18.00 20.00 22.00 24.00 26.00 28.00 30.00 32.00 </breakpoints>
            <breakpoints property="beta_deg">-8.00 0.00 8.00 </breakpoints>
            <breakpoints property="de_deg">-30.00 -20.00 -10.00 0.00 10.00 20.00 30.00 </breakpoints>
            <tableData>
 0.234125  0.228092  0.226601  0.225754  0.225381  0.220586  0.215692  0.211204  0.212635  0.239874  0.240474  0.243042  0.249400  0.241567  0.237035  0.236495  0.235630  0.230072  0.230395  0.239590
 0.218340  0.219762  0.216415  0.212841  0.211843  0.211327  0.212077  0.219584  0.225368  0.240079  0.258376  0.258965  0.240689  0.233518  0.235470  0.239306  0.242515  0.247797  0.252034  0.255954
 0.190852  0.183205  0.182634  0.177948  0.177519  0.172450  0.167591  0.165301  0.169850  0.178791  0.181304  0.182721  0.181245  0.175005  0.169840  0.167863  0.165259  0.162150  0.158750  0.167338
 0.000000  0.000000  0.000000  0.000000  0.000000  0.000000  0.000000  0.000000  0.000000  0.000000  0.000000  0.000000  0.000000  0.000000  0.000000  0.000000  0.000000  0.000000  0.000000  0.000000
-0.076643 -0.072957 -0.072884 -0.074221 -0.075069 -0.075794 -0.079576 -0.083765 -0.088067 -0.090696 -0.093994 -0.093562 -0.092222 -0.090225 -0.081579 -0.075065 -0.073113 -0.070442 -0.072649 -0.076283
-0.142400 -0.142701 -0.145454 -0.150716 -0.153654 -0.157256 -0.162223 -0.169281 -0.173067 -0.176996 -0.172727 -0.162695 -0.158607 -0.153947 -0.158362 -0.155504 -0.155659 -0.147496 -0.139506 -0.134476
-0.206483 -0.203430 -0.207212 -0.213394 -0.215204 -0.218955 -0.223031 -0.227856 -0.237084 -0.239433 -0.231406 -0.219411 -0.212519 -0.208286 -0.205686 -0.200018 -0.195588 -0.186325 -0.170564 -0.153888
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            </tableData>
          </table>
          <property>CmdeUncertGain</property>
        </product>
        <table name="Cm_dal">
          <breakpoints property="alpha_deg">-6.00 -4.00 -2.00 0.00 2.00 4.00 6.00 8.00 10.00 12.00 14.00 16.00 18.00 20.00 22.00 24.00 26.00 28.00 30.00 32.00 </breakpoints>
          <breakpoints property="beta_deg">-8.00 -4.00 0.00 4.00 8.00 </breakpoints>
          <breakpoints property="dal_deg">-30.00 -20.00 -10.00 0.00 10.00 20.00 30.00 </breakpoints>
          <tableData>
-0.017301 -0.015659 -0.016075 -0.017524 -0.018738 -0.018361 -0.017807 -0.016904 -0.010891 -0.006302 -0.010536 -0.014480 -0.019594 -0.022060 -0.026663 -0.028254 -0.033726 -0.030226 -0.032554 -0.032200
-0.024926 -0.024185 -0.024476 -0.026618 -0.026728 -0.024794 -0.028504 -0.026593 -0.018311 -0.013433 -0.011840 -0.013087 -0.025103 -0.028503 -0.029538 -0.032033 -0.030978 -0.034001 -0.038587 -0.035589
-0.028367 -0.026176 -0.025459 -0.027674 -0.027923 -0.027383 -0.027110 -0.025176 -0.020261 -0.015911 -0.019327 -0.018594 -0.022621 -0.021882 -0.020163 -0.020317 -0.027076 -0.026114 -0.024342 -0.026466
-0.025975 -0.024741 -0.024921 -0.027776 -0.029652 -0.027298 -0.026811 -0.026278 -0.027006 -0.026665 -0.028055 -0.028521 -0.024912 -0.022382 -0.024998 -0.026578 -0.027074 -0.028304 -0.027618 -0.027596
 0.000000  0.000000  0.000000  0.000000  0.000000  0.000000  0.000000  0.000000  0.000000  0.000000  0.000000  0.000000  0.000000  0.000000  0.000000  0.000000  0.000000  0.000000  0.000000  0.000000
-0.003277  0.000776  0.001944  0.001179  0.001780  0.000390 -0.000598 -0.001894 -0.006370 -0.008291 -0.005402 -0.002988 -0.000793  0.003243  0.001142  0.006625  0.009260  0.009532  0.008890  0.007292
 0.003242  0.008821  0.008339  0.007717  0.005223  0.002174  0.001924  0.000778 -0.003314 -0.010076 -0.009054 -0.005647  0.007351  0.011166  0.013425  0.015150  0.022511  0.020704  0.020864  0.022996
 0.016701  0.018916  0.015948  0.015447  0.013460  0.013579  0.012729  0.011200  0.010732  0.009900  0.004584  0.006289  0.015440  0.019978  0.017780  0.016040  0.015251  0.015904  0.018278  0.019211
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          </tableData>
        </table>
        <table name="Cm_dar">
          <breakpoints property="alpha_deg">-6.00 -4.00 -2.00 0.00 2.00 4.00 6.00 8.00 10.00 12.00 14.00 16.00 18.00 20.00 22.00 24.00 26.00 28.00 30.00 32.00 </breakpoints>
          <breakpoints property="beta_deg">-8.00 -4.00 0.00 4.00 8.00 </breakpoints>
          <breakpoints property="dar_deg">-30.00 -20.00 -10.00 0.00 10.00 20.00 30.00 </breakpoints>
          <tableData>
 0.016701  0.018916  0.015948  0.015447  0.013460  0.013579  0.012729  0.011200  0.010732  0.009900  0.004584  0.006289  0.015440  0.019978  0.017780  0.016040  0.015251  0.015904  0.018278  0.019211
 0.021246  0.022491  0.018526  0.014947  0.013176  0.012697  0.010657  0.006020  0.004507  0.000976 -0.001923 -0.001381  0.004985  0.006669  0.008911  0.013915  0.019119  0.021588  0.024416  0.023052
 0.010280  0.013062  0.012129  0.011415  0.010972  0.009927  0.007778  0.004315  0.001205 -0.000908 -0.002934 -0.001825  0.001874  0.005188  0.010794  0.013629  0.011165  0.013802  0.015373  0.018388
-0.008506 -0.006178 -0.005560 -0.005501 -0.006891 -0.009767 -0.009750 -0.011607 -0.013649 -0.014915 -0.012807 -0.009084 -0.011122 -0.011170 -0.009378 -0.007969 -0.004932 -0.001777 -0.001813 -0.004051
 0.000000  0.000000  0.000000  0.000000  0.000000  0.000000  0.000000  0.000000  0.000000  0.000000  0.000000  0.000000  0.000000  0.000000  0.000000  0.000000  0.000000  0.000000  0.000000  0.000000
-0.043490 -0.041598 -0.041487 -0.040761 -0.041900 -0.041924 -0.041561 -0.040244 -0.037818 -0.035736 -0.034372 -0.029208 -0.024194 -0.027091 -0.030768 -0.029091 -0.029471 -0.029589 -0.029441 -0.024769
-0.040598 -0.038993 -0.041552 -0.042648 -0.044900 -0.040742 -0.041733 -0.045802 -0.042372 -0.035886 -0.033998 -0.032651 -0.028051 -0.025116 -0.028317 -0.031459 -0.031935 -0.029632 -0.029328 -0.029670
-0.017301 -0.015659 -0.016075 -0.017524 -0.018738 -0.018361 -0.017807 -0.016904 -0.010891 -0.006302 -0.010536 -0.014480 -0.019594 -0.022060 -0.026663 -0.028254 -0.033726 -0.030226 -0.032554 -0.032200
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          </tableData>
        </table>
        <table name="Cm_dr">
          <breakpoints property="alpha_deg">-6.00 -4.00 -2.00 0.00 2.00 4.00 6.00 8.00 10.00 12.00 14.00 16.00 18.00 20.00 22.00 24.00 26.00 28.00 30.00 32.00 </breakpoints>
          <breakpoints property="beta_deg">-8.00 -4.00 0.00 4.00 8.00 </breakpoints>
          <breakpoints property="dr_deg">-30.00 -20.00 -10.00 0.00 10.00 20.00 30.00 </breakpoints>
          <tableData>
-0.001142  0.001821  0.004257  0.004204  0.004319  0.004409  0.003939  0.001018  0.000785  0.003722  0.006709  0.004577 -0.004831 -0.016440 -0.013526 -0.010373 -0.016196 -0.016413 -0.019061 -0.018633
-0.004453 -0.002033 -0.000812 -0.000145  0.000242 -0.000610 -0.000106 -0.001606 -0.001615 -0.000999  0.001696  0.003566 -0.003111 -0.006726 -0.014885 -0.020579 -0.013462 -0.013568 -0.016746 -0.020773
-0.009931 -0.007999 -0.007726 -0.007901 -0.007819 -0.007378 -0.007554 -0.007750 -0.008761 -0.007306 -0.008304 -0.008792 -0.010764 -0.009319 -0.006222 -0.011226 -0.018187 -0.018473 -0.016721 -0.018184
-0.015301 -0.013303 -0.012917 -0.014723 -0.015254 -0.015943 -0.014237 -0.015229 -0.015543 -0.015833 -0.015105 -0.015425 -0.018527 -0.017087 -0.017144 -0.017257 -0.016963 -0.019479 -0.021672 -0.022851
 0.000000  0.000000  0.000000  0.000000  0.000000  0.000000  0.000000  0.000000  0.000000  0.000000  0.000000  0.000000  0.000000  0.000000  0.000000  0.000000  0.000000  0.000000  0.000000  0.000000
-0.003246 -0.001781 -0.004095 -0.006245 -0.007127 -0.005879 -0.005532 -0.006628 -0.007752 -0.009656 -0.010466 -0.008116 -0.004281 -0.006099 -0.008414 -0.005124 -0.009742 -0.001414  0.000017 -0.009080
-0.001528 -0.000039  0.000172  0.000457 -0.000815 -0.002344 -0.001781 -0.002523 -0.003550 -0.004121 -0.004965 -0.005552 -0.005526 -0.002481 -0.003771 -0.001671 -0.002509 -0.007280 -0.017437 -0.022114
-0.001142  0.001821  0.004257  0.004204  0.004319  0.004409  0.003939  0.001018  0.000785  0.003722  0.006709  0.004577 -0.004831 -0.016440 -0.013526 -0.010373 -0.016196 -0.016413 -0.019061 -0.018633
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          </tableData>
        </table>
        <product>
          <property>cmq</property>
          <property>q_norm</property>
          <property>CmqUncertGain</property>
        </product>
        <property>Cm0UncertVal</property>
      </add>
    </function>
    <function name="Cs">
      <add>
        <table name="Cs_base">
          <breakpoints property="alpha_deg">-6.00 -4.00 -2.00 0.00 2.00 4.00 6.00 8.00 10.00 12.00 14.00 16.00 18.00 20.00 22.00 24.00 26.00 28.00 30.00 32.00 </breakpoints>
          <breakpoints property="beta_deg">-12.00 -8.00 -4.00 0.00 4.00 8.00 12.00 </breakpoints>
          <tableData>
 0.120756  0.125064  0.125462  0.127046  0.127164  0.127082  0.128039  0.127377  0.126567  0.125577  0.107274  0.087338  0.086255  0.082984  0.087683  0.096501  0.103132  0.108746  0.114903  0.114418
 0.072913  0.076233  0.075506  0.077024  0.078209  0.078658  0.081359  0.083648  0.084765  0.085427  0.080340  0.065177  0.055127  0.051225  0.052310  0.054495  0.057996  0.063119  0.067498  0.066789
 0.032068  0.033520  0.032052  0.034447  0.035434  0.035255  0.037028  0.037986  0.039185  0.040805  0.040171  0.031194  0.028914  0.023361  0.021322  0.022429  0.024082  0.025643  0.029018  0.028658
 0.000000  0.000000  0.000000  0.000000  0.000000  0.000000  0.000000  0.000000  0.000000  0.000000  0.000000  0.000000  0.000000  0.000000  0.000000  0.000000  0.000000  0.000000  0.000000  0.000000
-0.032068 -0.033520 -0.032052 -0.034447 -0.035434 -0.035255 -0.037028 -0.037986 -0.039185 -0.040805 -0.040171 -0.031194 -0.028914 -0.023361 -0.021322 -0.022429 -0.024082 -0.025643 -0.029018 -0.028658
-0.072913 -0.076233 -0.075506 -0.077024 -0.078209 -0.078658 -0.081359 -0.083648 -0.084765 -0.085427 -0.080340 -0.065177 -0.055127 -0.051225 -0.052310 -0.054495 -0.057996 -0.063119 -0.067498 -0.066789
-0.120756 -0.125064 -0.125462 -0.127046 -0.127164 -0.127082 -0.128039 -0.127377 -0.126567 -0.125577 -0.107274 -0.087338 -0.086255 -0.082984 -0.087683 -0.096501 -0.103132 -0.108746 -0.114903 -0.114418
          </tableData>
        </table>
        <table name="Cs_dal">
          <breakpoints property="alpha_deg">-6.00 -4.00 -2.00 0.00 2.00 4.00 6.00 8.00 10.00 12.00 14.00 16.00 18.00 20.00 22.00 24.00 26.00 28.00 30.00 32.00 </breakpoints>
          <breakpoints property="beta_deg">-8.00 -4.00 0.00 4.00 8.00 </breakpoints>
          <breakpoints property="dal_deg">-30.00 -20.00 -10.00 0.00 10.00 20.00 30.00 </breakpoints>
          <tableData>
-0.032516 -0.029895 -0.026089 -0.025586 -0.025337 -0.022669 -0.019909 -0.017503 -0.013674 -0.009071 -0.006115  0.003929  0.005289  0.011084  0.016597  0.020405  0.022642  0.020428  0.021856  0.026975
-0.032820 -0.030415 -0.027135 -0.026936 -0.024306 -0.019855 -0.017470 -0.015354 -0.012481 -0.008164 -0.005572  0.003301  0.007213  0.014485  0.021180  0.027848  0.031192  0.035642  0.034602  0.036523
-0.029929 -0.028492 -0.024224 -0.021664 -0.020294 -0.016525 -0.014511 -0.011987 -0.008366 -0.004522 -0.000632  0.006387  0.006147  0.012346  0.019351  0.027240  0.031077  0.035745  0.035109  0.037073
-0.028798 -0.023700 -0.022825 -0.017790 -0.014859 -0.012616 -0.009128 -0.005828 -0.002020  0.002109  0.009417  0.012158  0.017292  0.015437  0.016074  0.018918  0.021930  0.027822  0.034526  0.041456
 0.000000  0.000000  0.000000  0.000000  0.000000  0.000000  0.000000  0.000000  0.000000  0.000000  0.000000  0.000000  0.000000  0.000000  0.000000  0.000000  0.000000  0.000000  0.000000  0.000000
-0.016567 -0.014075 -0.008863 -0.008053 -0.007009 -0.002992 -0.000652  0.001635  0.006773  0.008024  0.009126  0.013290  0.017882  0.022402  0.023702  0.022801  0.022471  0.023680  0.022554  0.023046
 0.035579  0.031635  0.003517 -0.003020 -0.013231 -0.034387 -0.043311 -0.058269 -0.076385 -0.092353 -0.104707 -0.128219 -0.123603 -0.148639 -0.162431 -0.178847 -0.181482 -0.191085 -0.213178 -0.228616
 0.030611  0.030712 -0.000290 -0.004038 -0.012761 -0.036921 -0.044653 -0.059329 -0.076657 -0.091395 -0.099744 -0.125302 -0.114479 -0.145922 -0.163104 -0.177031 -0.179534 -0.196060 -0.218019 -0.238732
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          </tableData>
        </table>
        <table name="Cs_dar">
          <breakpoints property="alpha_deg">-6.00 -4.00 -2.00 0.00 2.00 4.00 6.00 8.00 10.00 12.00 14.00 16.00 18.00 20.00 22.00 24.00 26.00 28.00 30.00 32.00 </breakpoints>
          <breakpoints property="beta_deg">-8.00 -4.00 0.00 4.00 8.00 </breakpoints>
          <breakpoints property="dar_deg">-30.00 -20.00 -10.00 0.00 10.00 20.00 30.00 </breakpoints>
          <tableData>
-0.030611 -0.030712  0.000290  0.004038  0.012761  0.036921  0.044653  0.059329  0.076657  0.091395  0.099744  0.125302  0.114479  0.145922  0.163104  0.177031  0.179534  0.196060  0.218019  0.238732
-0.027415 -0.026167  0.004492  0.006582  0.016308  0.039889  0.048511  0.064706  0.081965  0.097190  0.104868  0.133509  0.118932  0.154164  0.169275  0.183839  0.183776  0.201149  0.224429  0.242943
 0.015917  0.013376  0.009865  0.009294  0.006266  0.003410 -0.000282 -0.003543 -0.006848 -0.009639 -0.010976 -0.012640 -0.011110 -0.012363 -0.014480 -0.014869 -0.012663 -0.010318 -0.007787 -0.008342
 0.014534  0.012403  0.007545  0.006458  0.003427 -0.000839 -0.003617 -0.006824 -0.009390 -0.011454 -0.012236 -0.016895 -0.010542 -0.016094 -0.019857 -0.020489 -0.017889 -0.018215 -0.019240 -0.016543
 0.000000  0.000000  0.000000  0.000000  0.000000  0.000000  0.000000  0.000000  0.000000  0.000000  0.000000  0.000000  0.000000  0.000000  0.000000  0.000000  0.000000  0.000000  0.000000  0.000000
 0.037508  0.032596  0.030258  0.027336  0.024524  0.021381  0.017192  0.014527  0.010259  0.002372 -0.007565 -0.010118 -0.008759 -0.007430 -0.007533 -0.014024 -0.020013 -0.029660 -0.044214 -0.050867
 0.041327  0.037553  0.036573  0.031627  0.028973  0.027365  0.024253  0.021544  0.017402  0.013428  0.004738  0.000402 -0.007026 -0.007189 -0.011589 -0.020567 -0.029926 -0.039990 -0.046815 -0.052934
 0.032516  0.029895  0.026089  0.025586  0.025337  0.022669  0.019909  0.017503  0.013674  0.009071  0.006115 -0.003929 -0.005289 -0.011084 -0.016597 -0.020405 -0.022642 -0.020428 -0.021856 -0.026975
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          </tableData>
        </table>
        <product>
          <table name="Cs_dr">
            <breakpoints property="alpha_deg">-6.00 -4.00 -2.00 0.00 2.00 4.00 6.00 8.00 10.00 12.00 14.00 16.00 18.00 20.00 22.00 24.00 26.00 28.00 30.00 32.00 </breakpoints>
            <breakpoints property="beta_deg">-8.00 -4.00 0.00 4.00 8.00 </breakpoints>
            <breakpoints property="dr_deg">-30.00 -20.00 -10.00 0.00 10.00 20.00 30.00 </breakpoints>
            <tableData>
-0.102487 -0.101159 -0.098320 -0.097319 -0.094606 -0.089449 -0.086593 -0.084347 -0.081392 -0.076783 -0.073949 -0.064670 -0.050478 -0.039549 -0.034701 -0.029225 -0.020162 -0.013897 -0.001483  0.009670
-0.101482 -0.097479 -0.093281 -0.092405 -0.089155 -0.086443 -0.086321 -0.084554 -0.081011 -0.078525 -0.076600 -0.069721 -0.066194 -0.048191 -0.032292 -0.016843 -0.007432  0.005732  0.013034  0.019537
-0.071253 -0.070841 -0.070735 -0.070268 -0.070313 -0.071424 -0.071770 -0.073156 -0.075160 -0.074223 -0.073162 -0.069154 -0.063914 -0.055729 -0.042343 -0.029149 -0.020237 -0.013764 -0.009688 -0.005144
-0.037473 -0.039105 -0.044152 -0.045228 -0.047249 -0.052356 -0.054538 -0.057608 -0.060255 -0.064182 -0.064907 -0.064873 -0.048177 -0.049385 -0.051555 -0.051011 -0.044211 -0.041679 -0.035600 -0.036122
 0.000000  0.000000  0.000000  0.000000  0.000000  0.000000  0.000000  0.000000  0.000000  0.000000  0.000000  0.000000  0.000000  0.000000  0.000000  0.000000  0.000000  0.000000  0.000000  0.000000
 0.069290  0.071662  0.076179  0.078713  0.081188  0.083249  0.083763  0.085580  0.088527  0.089707  0.079450  0.071628  0.064203  0.066226  0.068089  0.075455  0.080883  0.080278  0.060408  0.041713
 0.134699  0.132913  0.105573  0.098373  0.088097  0.065898  0.057076  0.041118  0.022047  0.007063 -0.009072 -0.044434 -0.060801 -0.088907 -0.098753 -0.112303 -0.121472 -0.146077 -0.185265 -0.205777
 0.102487  0.101159  0.098320  0.097319  0.094606  0.089449  0.086593  0.084347  0.081392  0.076783  0.073949  0.064670  0.050478  0.039549  0.034701  0.029225  0.020162  0.013897  0.001483 -0.009670
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            </tableData>
          </table>
          <property>CYdrUncertGain</property>
        </product>
        <property>CY0UncertVal</property>
      </add>
    </function>
    <function name="Cn">
      <add>
        <table name="Cn_base">
          <breakpoints property="alpha_deg">-6.00 -4.00 -2.00 0.00 2.00 4.00 6.00 8.00 10.00 12.00 14.00 16.00 18.00 20.00 22.00 24.00 26.00 28.00 30.00 32.00 </breakpoints>
          <breakpoints property="beta_deg">-12.00 -8.00 -4.00 0.00 4.00 8.00 12.00 </breakpoints>
          <tableData>
-0.011353 -0.010955 -0.011346 -0.011709 -0.012105 -0.011013 -0.010125 -0.009369 -0.009254 -0.009642 -0.002601  0.005420  0.006728  0.009535  0.009170  0.009330  0.011668  0.014119  0.013940  0.017900
-0.006309 -0.004929 -0.004743 -0.005194 -0.005924 -0.005808 -0.005978 -0.005975 -0.006134 -0.006925 -0.004321  0.001827  0.006014  0.006682  0.007955  0.007957  0.009266  0.011472  0.009554  0.010700
-0.002376 -0.001778 -0.001360 -0.001915 -0.001732 -0.001616 -0.002125 -0.001473 -0.001583 -0.002408 -0.000962  0.002034  0.003410  0.003959  0.006357  0.006319  0.006055  0.005430  0.004991  0.007488
 0.000000  0.000000  0.000000  0.000000  0.000000  0.000000  0.000000  0.000000  0.000000  0.000000  0.000000  0.000000  0.000000  0.000000  0.000000  0.000000  0.000000  0.000000  0.000000  0.000000
 0.002376  0.001778  0.001360  0.001915  0.001732  0.001616  0.002125  0.001473  0.001583  0.002408  0.000962 -0.002034 -0.003410 -0.003959 -0.006357 -0.006319 -0.006055 -0.005430 -0.004991 -0.007488
 0.006309  0.004929  0.004743  0.005194  0.005924  0.005808  0.005978  0.005975  0.006134  0.006925  0.004321 -0.001827 -0.006014 -0.006682 -0.007955 -0.007957 -0.009266 -0.011472 -0.009554 -0.010700
 0.011353  0.010955  0.011346  0.011709  0.012105  0.011013  0.010125  0.009369  0.009254  0.009642  0.002601 -0.005420 -0.006728 -0.009535 -0.009170 -0.009330 -0.011668 -0.014119 -0.013940 -0.017900
          </tableData>
        </table>
        <product>
          <table name="Cn_dr">
            <breakpoints property="alpha_deg">-6.00 -4.00 -2.00 0.00 2.00 4.00 6.00 8.00 10.00 12.00 14.00 16.00 18.00 20.00 22.00 24.00 26.00 28.00 30.00 32.00 </breakpoints>
            <breakpoints property="beta_deg">-8.00 -4.00 0.00 4.00 8.00 </breakpoints>
            <breakpoints property="dr_deg">-30.00 -20.00 -10.00 0.00 10.00 20.00 30.00 </breakpoints>
            <tableData>
 0.035747  0.035869  0.036282  0.036356  0.036412  0.035509  0.035273  0.034736  0.034565  0.034337  0.033359  0.029719  0.024263  0.021048  0.018493  0.017505  0.014562  0.010586  0.008966  0.004252
 0.036085  0.035221  0.034764  0.034669  0.034187  0.034152  0.035211  0.035137  0.034789  0.035444  0.034278  0.032027  0.029571  0.023662  0.017509  0.012490  0.008370  0.003826  0.003188 -0.000319
 0.028811  0.028655  0.028522  0.028444  0.028404  0.028714  0.029082  0.029657  0.030348  0.030168  0.029563  0.028011  0.025187  0.021340  0.015558  0.011167  0.008492  0.006549  0.004653  0.003912
 0.020080  0.020357  0.020877  0.020984  0.020986  0.021566  0.021360  0.021994  0.022313  0.022479  0.022805  0.022205  0.015971  0.015314  0.015030  0.014451  0.012323  0.010303  0.008119  0.008637
 0.000000  0.000000  0.000000  0.000000  0.000000  0.000000  0.000000  0.000000  0.000000  0.000000  0.000000  0.000000  0.000000  0.000000  0.000000  0.000000  0.000000  0.000000  0.000000  0.000000
-0.033138 -0.033260 -0.033860 -0.034177 -0.033915 -0.033581 -0.032910 -0.033172 -0.033429 -0.032736 -0.028243 -0.024652 -0.021437 -0.020041 -0.021556 -0.022301 -0.023263 -0.024714 -0.018031 -0.013152
-0.046572 -0.046573 -0.044930 -0.045244 -0.043357 -0.042501 -0.040674 -0.038858 -0.036136 -0.036321 -0.031249 -0.020604 -0.011496 -0.003051  0.000472  0.001468  0.006003  0.008294  0.019458  0.020065
-0.035747 -0.035869 -0.036282 -0.036356 -0.036412 -0.035509 -0.035273 -0.034736 -0.034565 -0.034337 -0.033359 -0.029719 -0.024263 -0.021048 -0.018493 -0.017505 -0.014562 -0.010586 -0.008966 -0.004252
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            </tableData>
          </table>
          <property>CndrUncertGain</property>
        </product>
        <product>
        <table name="Cn_dar">
          <breakpoints property="alpha_deg">-6.00 -4.00 -2.00 0.00 2.00 4.00 6.00 8.00 10.00 12.00 14.00 16.00 18.00 20.00 22.00 24.00 26.00 28.00 30.00 32.00 </breakpoints>
          <breakpoints property="beta_deg">-8.00 -4.00 0.00 4.00 8.00 </breakpoints>
          <breakpoints property="dar_deg">-30.00 -20.00 -10.00 0.00 10.00 20.00 30.00 </breakpoints>
          <tableData>
 0.018931  0.016283  0.013131  0.013306  0.012035  0.010688  0.008848  0.005323  0.001871  0.002487 -0.001433 -0.007908 -0.006344 -0.014440 -0.018944 -0.019342 -0.021614 -0.021986 -0.024371 -0.027117
 0.016225  0.014924  0.011555  0.011715  0.009193  0.007784  0.006472  0.002771 -0.000383 -0.000921 -0.005301 -0.011631 -0.009007 -0.016536 -0.021307 -0.021881 -0.022553 -0.021313 -0.027605 -0.031291
 0.004837  0.005466  0.005177  0.004426  0.004277  0.004208  0.004205  0.004334  0.003950  0.003362  0.003057  0.003337  0.002740  0.002684  0.003632  0.002834  0.003095  0.001921  0.001341  0.002128
 0.002170  0.002758  0.002753  0.002749  0.002858  0.003404  0.002912  0.003493  0.003290  0.002549  0.002702  0.004000  0.001985  0.003292  0.004140  0.004044  0.003890  0.003072  0.001719  0.003703
 0.000000  0.000000  0.000000  0.000000  0.000000  0.000000  0.000000  0.000000  0.000000  0.000000  0.000000  0.000000  0.000000  0.000000  0.000000  0.000000  0.000000  0.000000  0.000000  0.000000
-0.007334 -0.008708 -0.008437 -0.007888 -0.007208 -0.007045 -0.006681 -0.007054 -0.006957 -0.003566 -0.000170 -0.000236 -0.001812 -0.001476 -0.000663  0.001243  0.002636  0.002973  0.007301  0.007491
-0.007333 -0.007195 -0.007170 -0.006549 -0.006706 -0.006950 -0.006442 -0.006516 -0.006163 -0.004853 -0.003632 -0.002384 -0.000896  0.001533  0.001133  0.002983  0.005373  0.008068  0.011209  0.009464
-0.004860 -0.004089 -0.003029 -0.003485 -0.004088 -0.004381 -0.004379 -0.003982 -0.003607 -0.003865 -0.003101  0.000562  0.001531  0.002127  0.004367  0.003867  0.004069  0.005799  0.003518  0.004605
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          </tableData>
        </table>
          <property>CndarUncertGain</property>
        </product>
        <product>
        <table name="Cn_dal">
          <breakpoints property="alpha_deg">-6.00 -4.00 -2.00 0.00 2.00 4.00 6.00 8.00 10.00 12.00 14.00 16.00 18.00 20.00 22.00 24.00 26.00 28.00 30.00 32.00 </breakpoints>
          <breakpoints property="beta_deg">-8.00 -4.00 0.00 4.00 8.00 </breakpoints>
          <breakpoints property="dal_deg">-30.00 -20.00 -10.00 0.00 10.00 20.00 30.00 </breakpoints>
          <tableData>
 0.004860  0.004089  0.003029  0.003485  0.004088  0.004381  0.004379  0.003982  0.003607  0.003865  0.003101 -0.000562 -0.001531 -0.002127 -0.004367 -0.003867 -0.004069 -0.005799 -0.003518 -0.004605
 0.005514  0.004567  0.003662  0.003603  0.003326  0.003174  0.003403  0.003055  0.002789  0.002761  0.002336 -0.000901 -0.001962 -0.003473 -0.006568 -0.007372 -0.007387 -0.008239 -0.006791 -0.008780
 0.007251  0.006616  0.006060  0.005678  0.005684  0.005402  0.005173  0.004883  0.004211  0.003926  0.002578  0.000759  0.000318 -0.001374 -0.003449 -0.004899 -0.006477 -0.007449 -0.007755 -0.007555
 0.006242  0.005979  0.006812  0.006055  0.006052  0.006120  0.005323  0.005299  0.004796  0.003745  0.002720  0.001914  0.000921 -0.000208  0.000717  0.000475 -0.000556 -0.002727 -0.004573 -0.005341
 0.000000  0.000000  0.000000  0.000000  0.000000  0.000000  0.000000  0.000000  0.000000  0.000000  0.000000  0.000000  0.000000  0.000000  0.000000  0.000000  0.000000  0.000000  0.000000  0.000000
-0.005706 -0.006304 -0.006824 -0.006496 -0.005942 -0.005829 -0.005620 -0.005245 -0.005455 -0.003805 -0.003899 -0.005375 -0.006869 -0.007334 -0.009142 -0.007981 -0.008716 -0.009744 -0.006329 -0.005597
-0.017078 -0.016722 -0.013970 -0.013856 -0.012035 -0.011301 -0.009545 -0.007037 -0.002916 -0.000372  0.004149  0.009542  0.006897  0.013135  0.016337  0.018207  0.020420  0.018934  0.026572  0.026041
-0.018931 -0.016283 -0.013131 -0.013306 -0.012035 -0.010688 -0.008848 -0.005323 -0.001871 -0.002487  0.001433  0.007908  0.006344  0.014440  0.018944  0.019342  0.021614  0.021986  0.024371  0.027117
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          </tableData>
        </table>
          <property>CndalUncertGain</property>
        </product>
        <product>
          <property>cnp</property>
          <property>p_norm</property>
          <property>CnpUncertGain</property>
        </product>
        <product>
          <property>cnr</property>
          <property>r_norm</property>
          <property>CnrUncertGain</property>
        </product>
        <property>Cn0UncertVal</property>
      </add>
    </function>
    <function name="Cl">
      <add>
        <table name="Cl_base">
          <breakpoints property="alpha_deg">-6.00 -4.00 -2.00 0.00 2.00 4.00 6.00 8.00 10.00 12.00 14.00 16.00 18.00 20.00 22.00 24.00 26.00 28.00 30.00 32.00 </breakpoints>
          <breakpoints property="beta_deg">-12.00 -8.00 -4.00 0.00 4.00 8.00 12.00 </breakpoints>
          <tableData>
 0.011893  0.016876  0.018894  0.022100  0.024840  0.027289  0.030354  0.032513  0.033773  0.032318  0.024934  0.021577  0.025506  0.018204  0.014528  0.012461  0.012189  0.010632  0.013889  0.023591
 0.006006  0.009885  0.011148  0.013274  0.015699  0.017421  0.020585  0.022376  0.023541  0.022925  0.018412  0.015137  0.017400  0.014308  0.010352  0.010554  0.010613  0.008741  0.011271  0.017712
 0.001903  0.004429  0.004384  0.006032  0.007188  0.008140  0.009969  0.011053  0.011602  0.012222  0.009380  0.006486  0.009724  0.007218  0.005361  0.005885  0.007366  0.007828  0.007180  0.007384
 0.000000  0.000000  0.000000  0.000000  0.000000  0.000000  0.000000  0.000000  0.000000  0.000000  0.000000  0.000000  0.000000  0.000000  0.000000  0.000000  0.000000  0.000000  0.000000  0.000000
-0.001903 -0.004429 -0.004384 -0.006032 -0.007188 -0.008140 -0.009969 -0.011053 -0.011602 -0.012222 -0.009380 -0.006486 -0.009724 -0.007218 -0.005361 -0.005885 -0.007366 -0.007828 -0.007180 -0.007384
-0.006006 -0.009885 -0.011148 -0.013274 -0.015699 -0.017421 -0.020585 -0.022376 -0.023541 -0.022925 -0.018412 -0.015137 -0.017400 -0.014308 -0.010352 -0.010554 -0.010613 -0.008741 -0.011271 -0.017712
-0.011893 -0.016876 -0.018894 -0.022100 -0.024840 -0.027289 -0.030354 -0.032513 -0.033773 -0.032318 -0.024934 -0.021577 -0.025506 -0.018204 -0.014528 -0.012461 -0.012189 -0.010632 -0.013889 -0.023591
          </tableData>
        </table>
        <product>
          <table name="Cl_dar">
            <breakpoints property="alpha_deg">-6.00 -4.00 -2.00 0.00 2.00 4.00 6.00 8.00 10.00 12.00 14.00 16.00 18.00 20.00 22.00 24.00 26.00 28.00 30.00 32.00 </breakpoints>
            <breakpoints property="beta_deg">-8.00 -4.00 0.00 4.00 8.00 </breakpoints>
            <breakpoints property="dar_deg">-30.00 -20.00 -10.00 0.00 10.00 20.00 30.00 </breakpoints>
            <tableData>
 0.052350  0.046309  0.041296  0.035162  0.032035  0.030414  0.027097  0.025567  0.024414  0.021946  0.028613  0.029107  0.008138  0.022587  0.035451  0.026440  0.025298  0.026778  0.021108  0.009329
 0.050191  0.044395  0.040581  0.033576  0.031508  0.029488  0.026196  0.024292  0.022165  0.018663  0.026424  0.027339  0.005584  0.022182  0.032602  0.023633  0.021722  0.023580  0.022196  0.015424
 0.022203  0.024727  0.024238  0.022990  0.022924  0.023325  0.022782  0.022402  0.021086  0.021598  0.019021  0.017891  0.020530  0.020007  0.019042  0.021456  0.020882  0.020725  0.021064  0.021073
 0.012300  0.014796  0.014497  0.015321  0.015509  0.015194  0.015219  0.014849  0.013628  0.013982  0.011094  0.009763  0.013731  0.010359  0.009333  0.010285  0.012023  0.012967  0.012743  0.011629
 0.000000  0.000000  0.000000  0.000000  0.000000  0.000000  0.000000  0.000000  0.000000  0.000000  0.000000  0.000000  0.000000  0.000000  0.000000  0.000000  0.000000  0.000000  0.000000  0.000000
-0.016902 -0.018081 -0.017338 -0.016602 -0.016884 -0.016210 -0.017017 -0.016721 -0.015752 -0.016373 -0.015964 -0.015475 -0.013677 -0.009471 -0.007189 -0.004909 -0.004880 -0.001173  0.001498 -0.003306
-0.024158 -0.024816 -0.023176 -0.022094 -0.021920 -0.018996 -0.021246 -0.023629 -0.021866 -0.021902 -0.018396 -0.011664 -0.014397 -0.011674 -0.008151 -0.006043 -0.006514 -0.005861 -0.005322 -0.003686
-0.024538 -0.023980 -0.024249 -0.022858 -0.022043 -0.021581 -0.021133 -0.019777 -0.017799 -0.013767 -0.012070 -0.012920 -0.009479 -0.010504 -0.010193 -0.007159 -0.005088 -0.007301 -0.006746 -0.004309
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            </tableData>
          </table>
          <property>CldarUncertGain</property>
        </product>
        <product>
          <table name="Cl_dal">
            <breakpoints property="alpha_deg">-6.00 -4.00 -2.00 0.00 2.00 4.00 6.00 8.00 10.00 12.00 14.00 16.00 18.00 20.00 22.00 24.00 26.00 28.00 30.00 32.00 </breakpoints>
            <breakpoints property="beta_deg">-8.00 -4.00 0.00 4.00 8.00 </breakpoints>
            <breakpoints property="dal_deg">-30.00 -20.00 -10.00 0.00 10.00 20.00 30.00 </breakpoints>
            <tableData>
 0.024538  0.023980  0.024249  0.022858  0.022043  0.021581  0.021133  0.019777  0.017799  0.013767  0.012070  0.012920  0.009479  0.010504  0.010193  0.007159  0.005088  0.007301  0.006746  0.004309
 0.024847  0.024431  0.024328  0.022805  0.022699  0.019479  0.022326  0.021448  0.019454  0.016176  0.013433  0.014680  0.008430  0.010737  0.010817  0.009314  0.004971  0.005252  0.006555  0.006059
 0.018684  0.017779  0.017532  0.016812  0.016463  0.016306  0.016326  0.015894  0.013637  0.012521  0.011477  0.010864  0.006759  0.009285  0.007452  0.005123  0.005131  0.005704  0.005990  0.004910
 0.007821  0.008686  0.007335  0.007306  0.006865  0.006409  0.006596  0.006181  0.005664  0.007280  0.007144  0.003226  0.005921  0.003354  0.002152  0.001679  0.002886  0.002829  0.001494  0.000730
 0.000000  0.000000  0.000000  0.000000  0.000000  0.000000  0.000000  0.000000  0.000000  0.000000  0.000000  0.000000  0.000000  0.000000  0.000000  0.000000  0.000000  0.000000  0.000000  0.000000
-0.019971 -0.022895 -0.022296 -0.022082 -0.022718 -0.022609 -0.022804 -0.022290 -0.020073 -0.019627 -0.016973 -0.015322 -0.015784 -0.014375 -0.011008 -0.011777 -0.015243 -0.015034 -0.015820 -0.018096
-0.044726 -0.043013 -0.038926 -0.034012 -0.031464 -0.028503 -0.025930 -0.024068 -0.019031 -0.014720 -0.018168 -0.015905 -0.006293 -0.014940 -0.025143 -0.017096 -0.023803 -0.026375 -0.022608 -0.015497
-0.052350 -0.046309 -0.041296 -0.035162 -0.032035 -0.030414 -0.027097 -0.025567 -0.024414 -0.021946 -0.028613 -0.029107 -0.008138 -0.022587 -0.035451 -0.026440 -0.025298 -0.026778 -0.021108 -0.009329
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            </tableData>
          </table>
          <property>CldalUncertGain</property>
        </product>
        <product>
          <table name="Cl_dr">
            <breakpoints property="alpha_deg">-6.00 -4.00 -2.00 0.00 2.00 4.00 6.00 8.00 10.00 12.00 14.00 16.00 18.00 20.00 22.00 24.00 26.00 28.00 30.00 32.00 </breakpoints>
            <breakpoints property="beta_deg">-8.00 -4.00 0.00 4.00 8.00 </breakpoints>
            <breakpoints property="dr_deg">-30.00 -20.00 -10.00 0.00 10.00 20.00 30.00 </breakpoints>
            <tableData>
-0.007490 -0.008749 -0.009245 -0.009776 -0.010357 -0.010098 -0.010160 -0.009846 -0.009589 -0.009534 -0.006436 -0.003444 -0.005725 -0.002188  0.000263 -0.003019 -0.006302 -0.005683 -0.005560 -0.006877
-0.007175 -0.007900 -0.007929 -0.008628 -0.009154 -0.009452 -0.010134 -0.010129 -0.010180 -0.010364 -0.007037 -0.004613 -0.008348 -0.002616 -0.000624 -0.002987 -0.005823 -0.006784 -0.006795 -0.005885
-0.010822 -0.010466 -0.010378 -0.010196 -0.010109 -0.010057 -0.010003 -0.010123 -0.010411 -0.009609 -0.008058 -0.006326 -0.005767 -0.004966 -0.003131 -0.003688 -0.004906 -0.005483 -0.005281 -0.005743
-0.013624 -0.012202 -0.011867 -0.011062 -0.010213 -0.009931 -0.009372 -0.009029 -0.008670 -0.007569 -0.008015 -0.006752 -0.001620 -0.004368 -0.006209 -0.004855 -0.004553 -0.003173 -0.005102 -0.004301
 0.000000  0.000000  0.000000  0.000000  0.000000  0.000000  0.000000  0.000000  0.000000  0.000000  0.000000  0.000000  0.000000  0.000000  0.000000  0.000000  0.000000  0.000000  0.000000  0.000000
 0.018659  0.017245  0.016540  0.015943  0.014751  0.014150  0.013324  0.012706  0.012151  0.009407  0.008773  0.008459  0.003890  0.006157  0.007488  0.006214  0.003676  0.006634  0.009700  0.008447
-0.000468  0.004660  0.006485  0.008726  0.010931  0.013066  0.015568  0.016394  0.017444  0.016483  0.007184  0.005495  0.021195  0.013075  0.004689  0.013133  0.011791  0.009971  0.013900  0.021410
 0.007490  0.008749  0.009245  0.009776  0.010357  0.010098  0.010160  0.009846  0.009589  0.009534  0.006436  0.003444  0.005725  0.002188 -0.000263  0.003019  0.006302  0.005683  0.005560  0.006877
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            </tableData>
          </table>
          <property>CldrUncertGain</property>
        </product>
        <product>
          <property>clp</property>
          <property>p_norm</property>
          <property>ClpUncertGain</property>
        </product>
        <product>
          <property>clr</property>
          <property>r_norm</property>
          <property>ClrUncertGain</property>
        </product>
        <property>Cl0UncertVal</property>
      </add>
    </function>
    <function name="coeff">
      <mux>
        <property>CD</property>
        <property>Cs</property>
        <property>CL</property>
        <property>Cl</property>
        <property>Cm</property>
        <property>Cn</property>
      </mux>
    </function>
    <output name="aerodynamics">
      <property>coeff</property>
      <property>coeff_type</property>
      <property alias="RefPos">RefPosCG</property>
      <property>RefArea</property>
      <property>RefSpan</property>
      <property>RefLen</property>
    </output>
  </subsystem>
  <subsystem name="propulsion">
    <input name="actuators" bus="true">
      <property select="throttle">throttle</property>
    </input>
    <constant>
       <property value="1">m</property>
    </constant>
    <parameter>
       <property value="1.0">ThrustUncertGain</property>
       <property value="0 0 0.0">engine_pos_m</property>
       <property value="0.0 0.0 0.0">engine_att_rad</property>
    </parameter>
    <function name="thrust_N">
       <product>
           <property>ThrustUncertGain</property>
           <value>12</value>
           <value>9.8</value>
           <saturation UpperLimit="1" LowerLimit="0">
               <property>throttle</property>
           </saturation>
       </product>
    </function>
     <output name="propulsion">
        <property alias="n">m</property>
        <property alias="thrust">thrust_N</property>
        <property alias="pos">engine_pos_m</property>
        <property alias="att">engine_att_rad</property>
    </output>
  </subsystem>
  <subsystem name="massbalance">
    <parameter>
      <property value="0 0 0">CG_bias_m</property>
      <property value="0 0 0;0 0 0;0 0 0">InertiaMoments_bias_kg_m2</property>
    </parameter>
    <constant>
      <property value="0 0 0">CG_base_m</property>
      <property value="0.25720 0 0;0 1.0548 0;0 0 1.18389">inertiaMoments_base_kg_m2</property>
    </constant>
    <function name="inertiaMoments_kg_m2">
       <add>
           <property>inertiaMoments_base_kg_m2</property>
           <property>InertiaMoments_bias_kg_m2</property>
        </add>
   </function>
   <function name="CG_m">
       <add>
           <property>CG_bias_m</property>
           <property>CG_base_m</property>
       </add>
    </function>
    <output name="massbalance">
      <property alias="CG">CG_m</property>
      <property alias="inertiaMoments">inertiaMoments_kg_m2</property>
    </output>
  </subsystem>
</fdm_config>
